Simulations: Version=159
  DataStore
  Folder Replacements
    Folder Cultivars
      Cultivar Rockstar
        Command:
          [Phenology].Phyllochron.BasePhyllochron.FixedValue = 99.1351271229079
          [Phenology].PhyllochronPpSensitivity.FixedValue = 0.35511766231399
          [Phenology].CAMP.FLNparams.MinLN = 6.0
          [Phenology].CAMP.FLNparams.PpLN = 8.4
          [Phenology].CAMP.FLNparams.VrnLN = 3.200000000000001
          [Phenology].CAMP.FLNparams.VxPLN = -1.200000000000001
          [Phenology].CAMP.EnvData.VrnTreatTemp = 6
          [Phenology].CAMP.EnvData.VrnTreatDuration = 60
          [Phenology].HeadEmergenceLongDayBase.FixedValue = 50
          [Phenology].HeadEmergencePpSensitivity.FixedValue = 3.8
  Simulation LTT2021
    Clock: Start=2021-05-11; End=2021-12-19
    Summary SummaryFile
    Weather: FileName=BARSsenap.met
    SoilArbitrator
    Zone Field: Area=1; Slope=0; AspectAngle=0; Altitude=50
      Fertiliser
      SurfaceOrganicMatter: InitialResidueName=wheat_stubble; InitialResidueType=wheat; InitialResidueMass=500; InitialStandingFraction=0; InitialCPR=0; InitialCNR=100
      Soil Soil_108: SoilType=Sandy clay loam; Site=Boorowa; NearestTown=Boorowa; Region=South West Slopes; State=New South Wales; Country=Australia; ApsoilNumber=244; Latitude=-34.48581; Longitude=148.71664; LocationAccuracy=+/- 20m; Comments=Classification based on Particle size analysis.
        DataSource=Data collected as part of the GRDC project ‘Training growers to manage soil water’ by CSIRO Sustainable Ecosystems in collaboration with farmers and Lachlan CMA
        Physical
          Thickness  ParticleSizeClay  ParticleSizeSand  ParticleSizeSilt  BD    AirDry  LL15  DUL   SAT
          50         22.472            66.382            11.146            1.09  0.085   0.17  0.31  0.547
          50         22.472            66.382            11.146            1.22  0.085   0.17  0.31  0.502
          50         22.472            66.382            11.146            1.35  0.136   0.17  0.31  0.456
          50         22.472            65.844            11.685            1.33  0.136   0.17  0.31  0.463
          200        31.448            57.072            11.481            1.31  0.17    0.17  0.31  0.47
          200        40.424            48.3              11.277            1.37  0.17    0.17  0.31  0.449
          200        46.136            44.22             9.645             1.37  0.17    0.17  0.32  0.449
          200        44.708            44.292            11                1.56  0.18    0.18  0.32  0.383
          200        43.28             44.365            12.356            1.71  0.18    0.18  0.33  0.346
          220        42.056            45.048            12.896            1.59  0.18    0.18  0.33  0.372
          SoilCrop CanolaSoil
            LL=[0.17, 0.17, 0.17, 0.17, 0.17, 0.17, 0.175, 0.195, 0.207, 0.218]
            KL=[0.06, 0.06, 0.06, 0.06, 0.06, 0.06, 0.04, 0.04, 0.04, 0.02]
            XF=[1, 1, 1, 1, 1, 1, 1, 1, 1, 1]
          SoilCrop WheatSoil
            LL=[0.17, 0.17, 0.17, 0.17, 0.17, 0.17, 0.175, 0.195, 0.207, 0.218]
            KL=[0.06, 0.06, 0.06, 0.06, 0.06, 0.06, 0.04, 0.04, 0.04, 0.02]
            XF=[1, 1, 1, 1, 1, 1, 1, 1, 1, 1]
          SoilCrop AgPastureSoil
            LL=[0.17, 0.17, 0.17, 0.17, 0.17, 0.17, 0.175, 0.195, 0.207, 0.218]
            KL=[0.06, 0.06, 0.06, 0.06, 0.06, 0.06, 0.04, 0.04, 0.04, 0.02]
            XF=[1, 1, 1, 1, 1, 1, 1, 1, 1, 1]
          SoilCrop ChickpeaSoil
            LL=[0.17, 0.17, 0.17, 0.17, 0.17, 0.17, 0.175, 0.195, 0.207, 0.218]
            KL=[0.06, 0.06, 0.06, 0.06, 0.06, 0.06, 0.04, 0.04, 0.04, 0.02]
            XF=[1, 1, 1, 1, 1, 1, 1, 1, 1, 1]
          SoilCrop OatsSoil
            LL=[0.17, 0.17, 0.17, 0.17, 0.17, 0.17, 0.175, 0.195, 0.207, 0.218]
            KL=[0.06, 0.06, 0.06, 0.06, 0.06, 0.06, 0.04, 0.04, 0.04, 0.02]
            XF=[1, 1, 1, 1, 1, 1, 1, 1, 1, 1]
          SoilCrop AusfarmPastureSoil
            LL=[0.17, 0.17, 0.17, 0.17, 0.17, 0.17, 0.175, 0.195, 0.207, 0.218]
            KL=[0.06, 0.06, 0.06, 0.06, 0.06, 0.06, 0.04, 0.04, 0.04, 0.02]
            XF=[1, 1, 1, 1, 1, 1, 1, 1, 1, 1]
          SoilCrop LucerneSoil
            LL=[0.17, 0.17, 0.17, 0.17, 0.17, 0.17, 0.175, 0.195, 0.207, 0.218]
            KL=[0.06, 0.06, 0.06, 0.06, 0.06, 0.06, 0.04, 0.04, 0.04, 0.02]
            XF=[1, 1, 1, 1, 1, 1, 1, 1, 1, 1]
        WaterBalance SoilWater: SummerDate=1-Nov; SummerU=6; SummerCona=3.5; WinterDate=1-Apr; WinterU=2; WinterCona=2; DiffusConst=88; DiffusSlope=35; Salb=0.13; CN2Bare=73; CNRed=20; CNCov=0.8; PSIDul=-100; Thickness=[150, 150, 300, 300, 300, 300, 300]; SWCON=[0.5, 0.5, 0.3, 0.3, 0.3, 0.3, 0.3]
        CERESSoilTemperature Temperature
        Solute NO3: Thickness=[50, 50, 50, 50, 200, 200, 200, 200, 200, 220]; InitialValuesUnits=kg/ha; WaterTableConcentration=0; D0=0; DepthConstant=0; MaxDepthSoluteAccessible=0; RunoffEffectivenessAtMovingSolute=0; MaxEffectiveRunoff=0
          InitialValues=[16.241, 11.407, 6.953, 4.615, 10.899, 5.946, 2.567, 4.742, 8.789, 9.375]
        Solute NH4: Thickness=[50, 50, 50, 50, 200, 200, 200, 200, 200, 220]; InitialValues=[0.91, 0.554, 0.149, 0.047, 0.681, -, -, -, -, -]; InitialValuesUnits=kg/ha; WaterTableConcentration=0; D0=0; DepthConstant=0; MaxDepthSoluteAccessible=0; RunoffEffectivenessAtMovingSolute=0; MaxEffectiveRunoff=0
        Solute UREA: Thickness=[50, 50, 50, 50, 200, 200, 200, 200, 200, 220]; InitialValues=[0, 0, 0, 0, 0, 0, 0, 0, 0, 0]; InitialValuesUnits=kg/ha; WaterTableConcentration=0; D0=0; DepthConstant=0; MaxDepthSoluteAccessible=0; RunoffEffectivenessAtMovingSolute=0; MaxEffectiveRunoff=0
        Organic: FOMCNRatio=40; CarbonUnits=Total
          Thickness  Carbon    SoilCNRatio  FBiom  FInert  FOM
          150        1.47753   12           0.04   0.4     347.129
          150        0.492734  12           0.02   0.5     270.344
          300        0.596396  12           0.02   0.7     163.972
          300        0.233578  12           0.02   0.7     99.4541
          300        0.181747  12           0.01   0.7     60.322
          300        0.181747  12           0.01   0.7     36.5871
          300        0.10073   12           0.01   0.7     22.1912
        Chemical: PHUnits=Water
          Thickness  PH   EC     ESP
          150        4.6  0.065  0.681
          150        4.6  0.075  1.12
          300        5.7  0.084  0.866
          300        5.8  0.093  1.447
          300        5.5  0.117  2.275
          300        5.4  0.068  2.953
          300        5.5  0.06   3.028
          PH source: Unknown source or quality of data
        Water: Thickness=[50, 50, 50, 50, 200, 200, 200, 200, 200, 220]; RelativeTo=LL15; FilledFromTop=false
          InitialValues=[0.251, 0.251, 0.251, 0.251, 0.251, 0.267, 0.254, 0.251, 0.291, 0.322]
        Nutrient
      Plant Wheat
      MicroClimate: a_interception=0; b_interception=1; c_interception=0; d_interception=0; SoilHeatFluxFraction=0.4; MinimumHeightDiffForNewLayer=0; NightInterceptionFraction=0.5; ReferenceHeight=2
      Manager Sow on a fixed date
        Crop = [Wheat]
        SowDate = 11-May
        CultivarName = Rockstar
        SowingDepth = 30
        RowSpacing = 250
        Population = 160
```csharp
using APSIM.Shared.Utilities;
using Models.Utilities;
using Models.Soils;
using Models.PMF;
using Models.Core;
using System;

namespace Models
{
    [Serializable]
    public class Script : Model
    {
        [Link] Clock Clock;
        [Link] Fertiliser Fertiliser;
        [Link] Summary Summary;
        [Link] Soil Soil;
        
        [Description("Crop")]
        public IPlant Crop { get; set; }

        [Description("Sowing date (d-mmm)")]
        public string SowDate { get; set; }

        [Display(Type = DisplayType.CultivarName)]
        [Description("Cultivar to be sown")]
        public string CultivarName { get; set; }

        [Description("Sowing depth (mm)")]
        public double SowingDepth { get; set; }

        [Description("Row spacing (mm)")]
        public double RowSpacing { get; set; }

        [Description("Plant population (/m2)")]
        public double Population { get; set; }

        [EventSubscribe("DoManagement")]
        private void OnDoManagement(object sender, EventArgs e)
        {
            if (DateUtilities.WithinDates(SowDate, Clock.Today, SowDate))
            {
                Crop.Sow(population: Population, cultivar: CultivarName, depth: SowingDepth, rowSpacing: RowSpacing);    
            }
        }
    }
}
```
      Manager SowingFertiliser
        Amount = 42.2
        CropName = wheat
```csharp
using Models.Soils;
using System;
using Models.Core;
using Models.PMF;
namespace Models
{
    [Serializable]
    public class Script : Model
    {
        [Link] Clock Clock;
        [Link] Fertiliser Fertiliser;
        [Link] Summary Summary;
        
        
        [Description("Amount of fertiliser to be applied (kg/ha)")]
        public double Amount { get; set;}
        
        [Description("Crop to be fertilised")]
        public string CropName { get; set;}
        
        
        

        [EventSubscribe("Sowing")]
        private void OnSowing(object sender, EventArgs e)
        {
            Model crop = sender as Model;
            if (crop.Name.ToLower()==CropName.ToLower())
                Fertiliser.Apply(Amount: Amount, Type: Fertiliser.Types.NO3N);
        }
        
    }
}
```
      Manager Fertilise on fixed dates
        FertiliserType = UreaN
        FertiliserDates = 14-aug
        Amount = 91
        AmountType = True
```csharp
using Models.Soils;
using System;
using Models.Core;
using Models.PMF;
using APSIM.Shared.Utilities;
namespace Models
{
    [Serializable]
    public class Script : Model
    {
        [Link] Clock Clock;
        [Link] Fertiliser Fertiliser;
        
        [Separator("A component to apply fertiliser on one or more dates on every year of the simulation")]

        [Description("Type of fertiliser to apply? ")] 
        public Fertiliser.Types FertiliserType { get; set; }

        [Description("Enter the fertilisation dates as dd-mmm with comma separation (any year information entered will be ignored): ")] 
        public string[] FertiliserDates { get; set; } 

        [Description("Amount of fertiliser to be applied (kg /ha)")] 
        public double Amount { get; set; }

        [Description("Is the above amount to be applied each time? (yes/ticked)? Or is it the total annual amount across all dates (no/unticked)")] 
        public bool AmountType { get; set; }
        
        [EventSubscribe("DoManagement")]
        private void OnDoManagement(object sender, EventArgs e)
        {
            foreach (string ddMMM in FertiliserDates)
            {
                if (DateUtilities.DatesEqual(ddMMM, Clock.Today))
                {
                    if (AmountType)
                        Fertiliser.Apply(Amount: Amount, Type: FertiliserType);
                    else
                        Fertiliser.Apply(Amount: Amount / FertiliserDates.Length, Type: FertiliserType);
                }
            }
        }
    }
}
```
      Manager Harvest
```csharp
using Models.Soils.Nutrients;
using System;
using Models.Core;
using Models.PMF;
using Models.Soils;
using Models.Soils.Nutrients;
using Models.Utilities;
using APSIM.Shared.Utilities;

namespace Models
{
    [Serializable]
    public class Script : Model
    {
        [Link] Plant Wheat;

        [EventSubscribe("DoManagement")]
        private void OnDoManagement(object sender, EventArgs e)
        {
            if (Wheat.IsReadyForHarvesting)
            {
               Wheat.Harvest();
               Wheat.EndCrop();    
            }
        
        }
        
    }
}
```
      Report: EventNames=[Clock].DoActualPlantGrowth
        VariableNames:
          [Clock].Today as Date
          [Wheat].Phenology.Zadok.Stage
          [Wheat].Phenology.Stage
          [Wheat].AboveGround.Wt
          [Wheat].Grain.Wt
          [Wheat].LAI
          [Wheat].Leaf.CoverGreen
          [Wheat].Stem.Wt
          [Wheat].Leaf.Wt
          [Wheat].AboveGround.N
          [Wheat].Grain.Size
          [Wheat].Grain.Number
          [Wheat].Leaf.Fn
          [Wheat].Leaf.Fw
