Simulations: Version=156
  Experiment PropertyReplacement
    Memo README
      This experiment uses a fertiliser factor to simulate an N-rate trial. The graph shows the effect of the fertiliser applications on total soil nitrate level in each treatment.
    Factors
      Factor Fertiliser
        Specification=[FertiliserRule].Script.ApplicationAmount = 0, 25, 50, 75, 100
    Simulation Base0
      Clock: Start=2003-10-20; End=2004-05-23
      Weather: FileName=%root%\Examples\WeatherFiles\lincoln.met
      Summary
      SoilArbitrator
      Zone Field: Area=1; Slope=0; AspectAngle=0; Altitude=50
        Irrigation
        Fertiliser
        Report: EventNames=[Clock].DoReport
          VariableNames:
            [Clock].Today
            [FertiliserRule].Script.ApplicationAmount
            sum([Soil].NO3.kgha) as NO3
        Soil: SoilType=Black Vertosol; LocalName=Waco; Site=Jimbour; NearestTown=Jimbour, Q 4352; Region=South East Queensland; NaturalVegetation=Grassland, mainly Qld bluegrass; Latitude=0; Longitude=0
          Physical
            Thickness  BD    AirDry  LL15  DUL   SAT
            150        1.02  0.15    0.29  0.54  0.59
            150        1.03  0.26    0.29  0.53  0.58
            300        1.02  0.29    0.29  0.54  0.59
            300        1.02  0.29    0.29  0.54  0.58
            300        1.06  0.3     0.3   0.52  0.57
            300        1.11  0.31    0.31  0.5   0.55
            300        1.12  0.32    0.32  0.5   0.55
            300        1.15  0.33    0.33  0.48  0.53
            300        1.18  0.34    0.34  0.47  0.52
            300        1.2   0.35    0.35  0.46  0.51
            300        1.25  0.36    0.36  0.44  0.49
            SoilCrop WheatSoil
              LL=[0.29, 0.29, 0.32, 0.38, 0.39, 0.39, 0.41, 0.48, 0.47, 0.46, 0.44]
              KL=[0.1, 0.1, 0.08, 0.06, 0.04, 0.02, 0.01, 0, 0, 0, 0]
              XF=[1, 1, 1, 1, 1, 1, 1, 0, 0, 0, 0]
            SoilCrop BarleySoil
              LL=[0.29, 0.29, 0.36, 0.43, 0.51, 0.5, 0.5, 0.48, 0.47, 0.46, 0.44]
              KL=[0.1, 0.1, 0.08, 0.06, 0.04, 0.02, 0.01, 0, 0, 0, 0]
              XF=[1, 1, 1, 1, 1, 1, 1, 0, 0, 0, 0]
            SoilCrop PotatoSoil
              LL=[0.29, 0.29, 0.36, 0.43, 0.51, 0.5, 0.5, 0.48, 0.47, 0.46, 0.44]
              KL=[0.1, 0.1, 0.08, 0.06, 0.04, 0.02, 0.01, 0, 0, 0, 0]
              XF=[1, 1, 1, 1, 1, 1, 1, 0, 0, 0, 0]
          WaterBalance SoilWater: SummerDate=1-Nov; SummerU=6; SummerCona=3; WinterDate=1-Apr; WinterU=6; WinterCona=3; DiffusConst=40; DiffusSlope=16; Salb=0.13; CN2Bare=73; CNRed=20; CNCov=0.8; DischargeWidth=0; CatchmentArea=0; PSIDul=-100
            Thickness  SWCON  KLAT
            150        0.3    0
            150        0.3    0
            300        0.3    0
            300        0.3    0
            300        0.3    0
            300        0.3    0
            300        0.3    0
            300        0.3    0
            300        0.3    0
            300        0.3    0
            300        0.3    0
          Organic: FOMCNRatio=40; CarbonUnits=Total
            Thickness  Carbon  SoilCNRatio  FBiom  FInert  FOM
            150        1.04    12.5         0.025  0.4     48.1286
            150        0.89    12.5         0.02   0.6     41.4247
            300        0.89    12.5         0.015  0.8     30.6882
            300        0.89    12.5         0.01   0.9     22.7344
            300        0.77    12.5         0.01   0.95    16.842
            300        0.45    12.5         0.01   0.95    12.4769
            300        0.27    12.5         0.01   0.95    9.2431
            300        0.22    12.5         0.01   0.95    6.84746
            300        0.16    12.5         0.01   0.95    5.07272
            300        0.13    12.5         0.01   0.95    3.75796
            300        0.12    12.5         0.01   0.95    2.78397
          Chemical: PHUnits=Water
            Thickness  PH   EC
            150        8.4  0.2
            150        8.8  0.25
            300        9    0.31
            300        9.2  0.4
            300        9.2  0.59
            300        9.1  0.84
            300        9    0.93
            300        9    1.01
            300        8.9  1.06
            300        8.9  1.05
            300        8.9  1.01
          Water: Thickness=[150, 150, 300, 300, 300, 300, 300, 300, 300, 300, 300]; FilledFromTop=true
            InitialValues=[0.54, 0.53, 0.54, 0.54, 0.52, 0.5, 0.5, 0.48, 0.47, 0.46, 0.44]
          CERESSoilTemperature Temperature
          Nutrient
          Solute NO3: Thickness=[150, 150, 300, 300, 300, 300, 300, 300, 300, 300, 300]; InitialValuesUnits=ppm; WaterTableConcentration=0; D0=0; DepthConstant=0; MaxDepthSoluteAccessible=0; RunoffEffectivenessAtMovingSolute=0; MaxEffectiveRunoff=0
            InitialValues=[6.503, 2.101, 2.101, 1.701, 1.701, 1.701, 1.701, 1.701, 1.701, 1.701, 1.701]
          Solute NH4: Thickness=[150, 150, 300, 300, 300, 300, 300, 300, 300, 300, 300]; InitialValuesUnits=ppm; WaterTableConcentration=0; D0=0; DepthConstant=0; MaxDepthSoluteAccessible=0; RunoffEffectivenessAtMovingSolute=0; MaxEffectiveRunoff=0
            InitialValues=[0.599004, 0.100001, 0.100001, 0.100001, 0.100001, 0.100001, 0.100001, 0.100001, 0.100001, 0.100001, 0.100001]
          Solute Urea: Thickness=[150, 150, 300, 300, 300, 300, 300, 300, 300, 300, 300]; InitialValues=[0, 0, 0, 0, 0, 0, 0, 0, 0, 0, 0]; InitialValuesUnits=kg/ha; WaterTableConcentration=0; D0=0; DepthConstant=0; MaxDepthSoluteAccessible=0; RunoffEffectivenessAtMovingSolute=0; MaxEffectiveRunoff=0
        SurfaceOrganicMatter: InitialResidueName=Potato; InitialResidueType=Potato; InitialResidueMass=1000; InitialStandingFraction=0; InitialCPR=0; InitialCNR=80
        Manager FertiliserRule
          ApplicationAmount = 500
          FertType = NO3N
          ApplicationDate = 12/30/2003 00:00:00
```csharp
using Models.Soils;
using System;
using Models.Core;
using Models.PMF;

namespace Models
{
    [Serializable]
    public class Script : Model
    {
        [Link]
        private Fertiliser fertiliser;

           [Link]
           private Clock clock;

        [Description("Amount (kg/ha) of fertiliser to apply")]
        public double ApplicationAmount {get; set;}

        [Description("Type of fertiliser to apply")]
        public Fertiliser.Types FertType { get; set; }

        [Description("Date of fertiliser application")]
        public DateTime ApplicationDate {get; set;}

        [EventSubscribe("DoManagement")]
        private void OnDoManagement(object sender, EventArgs e)
        {
            if (clock.Today.Date.Equals(ApplicationDate))
                fertiliser.Apply(Amount:ApplicationAmount,Type:FertType);
        }
    }
}
```
  Experiment RangeExperiment
    Memo README
      This experiment uses a fertiliser factor to simulate an N-rate trial, using the range syntax. The graph shows the effect of the fertiliser applications on soil nitrate level in each treatment.
    Factors
      Factor Fertiliser
        Specification=[FertiliserRule].Script.ApplicationAmount = 0 to 100 step 20
    Simulation Base1: same as PropertyReplacement.Base0
    Memo README1
      This experiment uses a fertiliser factor to simulate an N-rate trial, using the range syntax. The graph shows the effect of the fertiliser applications on total soil nitrate level in each treatment.
  Experiment CompositeFactor
    Memo README
      This experiment uses a composite factor to simulate different sites from a single experiment. The composite factors change the start date, end date, and weather file. They could also theoretically change other parameters, such as the soil. The graph below shows the cumulative rainfall per site.
    Factors
      Factor Site
        CompositeFactor Dalby
          Specifications:
            [Clock].StartDate=1988-01-01
            [Clock].EndDate=1988-12-31
            [Weather]
          Weather: FileName=%root%\Examples\WeatherFiles\Dalby.met
        CompositeFactor Goondiwindi
          Specifications:
            [Clock].StartDate=1940-01-01
            [Clock].EndDate=1940-12-31
            [Weather]
          Weather: FileName=%root%\Examples\WeatherFiles\Goond.met
    Simulation Base2
      Clock: Start=2003-10-20; End=2004-05-23
      Weather: FileName=%root%\Examples\WeatherFiles\Dalby.met
      Summary
      Zone Field: Area=1; Slope=0; AspectAngle=0; Altitude=50
        Irrigation
        Fertiliser
        Report: EventNames=[Clock].DoReport
          VariableNames:
            [Clock].Today.DayOfYear
            sum of [Weather].Rain from [Clock].StartDate to [Clock].EndDate as CumulativeRainfall
        Soil: same as PropertyReplacement.Base0.Field.Soil
        SurfaceOrganicMatter: InitialResidueName=Potato; InitialResidueType=Potato; InitialResidueMass=1000; InitialStandingFraction=0; InitialCPR=0; InitialCNR=80
        MicroClimate: a_interception=0; b_interception=1; c_interception=0; d_interception=0; SoilHeatFluxFraction=0.4; MinimumHeightDiffForNewLayer=0; NightInterceptionFraction=0.5; ReferenceHeight=2
        Operations FertiliserRule
          2003-11-15  [Fertiliser].Apply(10, Fertiliser.Types.UreaN, 0);
  Experiment ModelReplacement
    Memo README
      The irrigation factor in this experiment uses the model replacement syntax to replace the operations node in each treatment to simulate different different irrigation rates. The graph shows total soil water amount per treatment.
    Factors
      Factor Irrigation: Specification=[Operations]
        Operations Low
        Operations High
          2003-11-01  [Irrigation].Apply(30)
          2003-12-01  [Irrigation].Apply(30)
          2004-01-01  [Irrigation].Apply(30)
          2004-02-01  [Irrigation].Apply(30)
          2004-03-01  [Irrigation].Apply(30)
          2004-04-01  [Irrigation].Apply(30)
          2004-05-01  [Irrigation].Apply(30)
    Simulation Base3
      Clock: Start=2003-10-20; End=2004-05-23
      Weather: FileName=%root%\Examples\WeatherFiles\lincoln.met
      Summary
      SoilArbitrator
      Zone Field: Area=1; Slope=0; AspectAngle=0; Altitude=50
        Irrigation
        Fertiliser
        Report: EventNames=[Clock].DoReport
          VariableNames:
            [Clock].Today
            [FertiliserRule].Script.ApplicationAmount
            sum([Soil].SoilWater.Water) as SoilWater
            [Maize].Grain.Wt
        Soil: SoilType=Black Vertosol; LocalName=Waco; Site=Jimbour; NearestTown=Jimbour, Q 4352; Region=South East Queensland; NaturalVegetation=Grassland, mainly Qld bluegrass; Latitude=0; Longitude=0
          Physical
            Thickness  BD    AirDry  LL15  DUL   SAT
            150        1.02  0.15    0.29  0.54  0.59
            150        1.03  0.26    0.29  0.53  0.58
            300        1.02  0.29    0.29  0.54  0.59
            300        1.02  0.29    0.29  0.54  0.58
            300        1.06  0.3     0.3   0.52  0.57
            300        1.11  0.31    0.31  0.5   0.55
            300        1.12  0.32    0.32  0.5   0.55
            300        1.15  0.33    0.33  0.48  0.53
            300        1.18  0.34    0.34  0.47  0.52
            300        1.2   0.35    0.35  0.46  0.51
            300        1.25  0.36    0.36  0.44  0.49
            SoilCrop WheatSoil
              LL=[0.29, 0.29, 0.32, 0.38, 0.39, 0.39, 0.41, 0.48, 0.47, 0.46, 0.44]
              KL=[0.1, 0.1, 0.08, 0.06, 0.04, 0.02, 0.01, 0, 0, 0, 0]
              XF=[1, 1, 1, 1, 1, 1, 1, 0, 0, 0, 0]
            SoilCrop MaizeSoil
              LL=[0.29, 0.29, 0.36, 0.43, 0.51, 0.5, 0.5, 0.48, 0.47, 0.46, 0.44]
              KL=[0.1, 0.1, 0.08, 0.06, 0.04, 0.02, 0.01, 0, 0, 0, 0]
              XF=[1, 1, 1, 1, 1, 1, 1, 0, 0, 0, 0]
            SoilCrop PotatoSoil
              LL=[0.29, 0.29, 0.36, 0.43, 0.51, 0.5, 0.5, 0.48, 0.47, 0.46, 0.44]
              KL=[0.1, 0.1, 0.08, 0.06, 0.04, 0.02, 0.01, 0, 0, 0, 0]
              XF=[1, 1, 1, 1, 1, 1, 1, 0, 0, 0, 0]
          WaterBalance SoilWater: same as PropertyReplacement.Base0.Field.Soil.SoilWater
          Organic: same as PropertyReplacement.Base0.Field.Soil.Organic
          Chemical: same as PropertyReplacement.Base0.Field.Soil.Chemical
          Water: Thickness=[150, 150, 300, 300, 300, 300, 300, 300, 300, 300, 300]; FilledFromTop=true
            InitialValues=[0.54, 0.53, 0.54, 0.54, 0.52, 0.5, 0.5, 0.48, 0.47, 0.46, 0.44]
          CERESSoilTemperature Temperature
          Nutrient
          Solute NO3: same as PropertyReplacement.Base0.Field.Soil.NO3
          Solute NH4: same as PropertyReplacement.Base0.Field.Soil.NH4
          Solute Urea: same as PropertyReplacement.Base0.Field.Soil.Urea
        SurfaceOrganicMatter: InitialResidueName=Potato; InitialResidueType=Potato; InitialResidueMass=1000; InitialStandingFraction=0; InitialCPR=0; InitialCNR=80
        MicroClimate: a_interception=0; b_interception=1; c_interception=0; d_interception=0; SoilHeatFluxFraction=0.4; MinimumHeightDiffForNewLayer=0; NightInterceptionFraction=0.5; ReferenceHeight=2
        Manager FertiliserRule
          ApplicationAmount = 500
          FertType = NO3N
          ApplicationDate = 12/30/2003 00:00:00
```csharp
using Models.Soils;
using System;
using Models.Core;
using Models.PMF;

namespace Models
{
    [Serializable]
    public class Script : Model
    {      
        [Link]
        private Fertiliser fertiliser;

        [Link]
        private Clock clock;

        [Description("Amount (kg/ha) of fertiliser to apply")]
        public double ApplicationAmount {get; set;} //= 500;

        [Description("Type of fertiliser to apply")]
        public Fertiliser.Types FertType {get; set;}//= "NO3_N";

        [Description("Date of fertiliser application")]
        public DateTime ApplicationDate {get; set;} //= new DateTime(2003, 12, 30, 0, 0, 0);

        [EventSubscribe("DoManagement")]
        private void OnDoManagement(object sender, EventArgs e)
        {
            if (clock.Today.Date.Equals(ApplicationDate))
                fertiliser.Apply(Amount: ApplicationAmount, Type: FertType);
        }
    }
}
```
        Operations
        Plant Maize
        Manager Sow on a fixed date
          Crop = [Maize]
          SowDate = 10-Nov
          CultivarName = Dekalb_XL82
          SowingDepth = 30
          RowSpacing = 750
          Population = 6
```csharp
using APSIM.Shared.Utilities;
using Models.Utilities;
using Models.Soils;
using Models.PMF;
using Models.Core;
using System;

namespace Models
{
    [Serializable]
    public class Script : Model
    {
        [Link]
        private Clock clock;

        [Description("Crop")]
        public IPlant Crop { get; set; }

        [Description("Sowing date (d-mmm)")]
        public string SowDate { get; set; }

        [Display(Type = DisplayType.CultivarName)]
        [Description("Cultivar to be sown")]
        public string CultivarName { get; set; }

        [Description("Sowing depth (mm)")]
        public double SowingDepth { get; set; }

        [Description("Row spacing (mm)")]
        public double RowSpacing { get; set; }

        [Description("Plant population (/m2)")]
        public double Population { get; set; }

        [EventSubscribe("DoManagement")]
        private void OnDoManagement(object sender, EventArgs e)
        {
            if (DateUtilities.WithinDates(SowDate, clock.Today, SowDate))
            {
                Crop.Sow(population: Population, cultivar: CultivarName, depth: SowingDepth, rowSpacing: RowSpacing);    
            }
        }
    }
}
```
  Experiment Permutation
    Memo README
      This experiment uses a permutations node to run an irrigation x nrate simulation. Each combination of irrigation level and fertiliser amount is run as an individual treatment. A maize crop is grown in the base simulation, and the effects of the treatments on the yield are shown in the graph.
    Factors
      Permutation
        Factor Irrigation: same as ModelReplacement.Factors.Irrigation
        Factor Fertiliser: Specification=[FertiliserRule].Script.ApplicationAmount=0 to 100 step 20
    Simulation Base4
      Weather: FileName=%root%\Examples\WeatherFiles\lincoln.met
      Clock: Start=2003-10-20; End=2004-05-23
      Summary
      SoilArbitrator
      Zone Field: Area=1; Slope=0; AspectAngle=0; Altitude=50
        Irrigation
        Fertiliser
        Report: EventNames=[Clock].DoReport
          VariableNames:
            [Clock].Today
            [FertiliserRule].Script.ApplicationAmount
            [Maize].Grain.Wt
        Soil: same as ModelReplacement.Base3.Field.Soil
        SurfaceOrganicMatter: InitialResidueName=Potato; InitialResidueType=Potato; InitialResidueMass=1000; InitialStandingFraction=0; InitialCPR=0; InitialCNR=80
        MicroClimate: a_interception=0; b_interception=1; c_interception=0; d_interception=0; SoilHeatFluxFraction=0.4; MinimumHeightDiffForNewLayer=0; NightInterceptionFraction=0.5; ReferenceHeight=2
        Manager FertiliserRule
          ApplicationAmount = 500
          FertType = NO3N
          ApplicationDate = 12/30/2003 00:00:00
```csharp
using Models.Soils;
using System;
using Models.Core;
using Models.PMF;

namespace Models
{
    [Serializable]
    public class Script : Model
    {
        [Link]
        private Fertiliser fertiliser;

        [Link]
        private Clock clock;

        [Description("Amount (kg/ha) of fertiliser to apply")]
        public double ApplicationAmount { get; set; }

        [Description("Type of fertiliser to apply")]
        public Fertiliser.Types FertType { get; set; }

        [Description("Date of fertiliser application")]
        public DateTime ApplicationDate { get; set; }

        [EventSubscribe("DoManagement")]
        private void OnDoManagement(object sender, EventArgs e)
        {
            if (clock.Today.Date.Equals(ApplicationDate))
                fertiliser.Apply(ApplicationAmount, FertType);
        }
    }
}
```
        Operations
        Plant Maize
        Manager Sow on a fixed date
          Crop = [Maize]
          SowDate = 10-Nov
          CultivarName = Dekalb_XL82
          SowingDepth = 30
          RowSpacing = 750
          Population = 6
```csharp
using APSIM.Shared.Utilities;
using Models.Utilities;
using Models.Soils;
using Models.PMF;
using Models.Core;
using System;

namespace Models
{
    [Serializable]
    public class Script : Model
    {
        [Link] Clock Clock;
        [Link] Fertiliser Fertiliser;
        [Link] Summary Summary;
        [Link] Soil Soil;
        
        [Description("Crop")]
        public IPlant Crop { get; set; }

        [Description("Sowing date (d-mmm)")]
        public string SowDate { get; set; }

        [Display(Type = DisplayType.CultivarName)]
        [Description("Cultivar to be sown")]
        public string CultivarName { get; set; }

        [Description("Sowing depth (mm)")]
        public double SowingDepth { get; set; }

        [Description("Row spacing (mm)")]
        public double RowSpacing { get; set; }

        [Description("Plant population (/m2)")]
        public double Population { get; set; }

        [EventSubscribe("DoManagement")]
        private void OnDoManagement(object sender, EventArgs e)
        {
            if (DateUtilities.WithinDates(SowDate, Clock.Today, SowDate))
            {
                Crop.Sow(population: Population, cultivar: CultivarName, depth: SowingDepth, rowSpacing: RowSpacing);    
            }
        }
    }
}
```
  DataStore
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