Simulations: Version=156
  DataStore
  Simulation Continuous Wheat
    Weather
      FileName=/Users/whi492/Documents/Work/R met file calculations/DownloadMetfiles/Breeza.met
    Clock: Start=1947-01-01; End=1957-12-31
    Summary summaryfile
    Zone paddock: Area=1; Slope=0; AspectAngle=0; Altitude=50
      Soil: SoilType=Black Vertosol; Site=Jimbour; NearestTown=Jimbour, Q 4352; Region=South East Queensland; NaturalVegetation=Grassland, mainly Qld bluegrass; Latitude=0; Longitude=0
        Water: Thickness=[150, 150, 300, 300, 300, 300, 300, 300, 300, 300, 300]; FilledFromTop=true
          InitialValues=[0.54, 0.53, 0.54, 0.54, 0.52, 0.5, 0.5, 0.48, 0.47, 0.46, 0.44]
        Physical
          Thickness  BD    AirDry  LL15  DUL   SAT
          150        1.02  0.15    0.29  0.54  0.59
          150        1.03  0.26    0.29  0.53  0.58
          300        1.02  0.29    0.29  0.54  0.59
          300        1.02  0.29    0.29  0.54  0.58
          300        1.06  0.3     0.3   0.52  0.57
          300        1.11  0.31    0.31  0.5   0.55
          300        1.12  0.32    0.32  0.5   0.55
          300        1.15  0.33    0.33  0.48  0.53
          300        1.18  0.34    0.34  0.47  0.52
          300        1.2   0.35    0.35  0.46  0.51
          300        1.25  0.36    0.36  0.44  0.49
          SoilCrop BarleySoil
            LL=[0.29, 0.29, 0.32, 0.38, 0.39, 0.39, 0.41, 0.48, 0.47, 0.46, 0.44]
            KL=[0.1, 0.1, 0.08, 0.06, 0.04, 0.02, 0.01, 0, 0, 0, 0]
            XF=[1, 1, 1, 1, 1, 1, 1, 0, 0, 0, 0]
          SoilCrop ChickpeaSoil
            LL=[0.29, 0.29, 0.36, 0.43, 0.51, 0.5, 0.5, 0.48, 0.47, 0.46, 0.44]
            KL=[0.1, 0.1, 0.08, 0.06, 0.04, 0.02, 0.01, 0, 0, 0, 0]
            XF=[1, 1, 1, 1, 1, 1, 1, 0, 0, 0, 0]
          SoilCrop LucerneSoil
            LL=[0.29, 0.29, 0.29, 0.29, 0.3, 0.31, 0.32, 0.33, 0.34, 0.35, 0.36]
            KL=[0.1, 0.1, 0.1, 0.1, 0.09, 0.09, 0.09, 0.09, 0.09, 0.09, 0.09]
            XF=[1, 1, 1, 1, 1, 1, 1, 1, 1, 1, 1]
          SoilCrop MaizeSoil
            LL=[0.29, 0.29, 0.34, 0.34, 0.37, 0.4, 0.42, 0.48, 0.47, 0.46, 0.44]
            KL=[0.1, 0.1, 0.1, 0.08, 0.06, 0.04, 0.02, 0, 0, 0, 0]
            XF=[1, 1, 1, 1, 1, 1, 1, 0, 0, 0, 0]
          SoilCrop Perennial GrassSoil
            LL=[0.29, 0.29, 0.39, 0.41, 0.4, 0.4, 0.41, 0.41, 0.4, 0.4, 0.42]
            KL=[0.1, 0.1, 0.1, 0.1, 0.09, 0.07, 0.05, 0, 0, 0, 0]
            XF=[1, 1, 1, 1, 1, 1, 1, 0, 0, 0, 0]
          SoilCrop SorghumSoil
            LL=[0.29, 0.29, 0.35, 0.38, 0.4, 0.4, 0.4, 0.48, 0.47, 0.46, 0.44]
            KL=[0.1, 0.1, 0.1, 0.08, 0.06, 0.04, 0.02, 0, 0, 0, 0]
            XF=[1, 1, 1, 1, 1, 1, 1, 0, 0, 0, 0]
          SoilCrop WheatSoil
            LL=[0.29, 0.29, 0.32, 0.32, 0.35, 0.38, 0.41, 0.48, 0.47, 0.46, 0.44]
            KL=[0.1, 0.1, 0.08, 0.06, 0.04, 0.02, 0.01, 0, 0, 0, 0]
            XF=[1, 1, 1, 1, 1, 1, 1, 0, 0, 0, 0]
        WaterBalance SoilWater: SummerDate=1-Nov; SummerU=6; SummerCona=3.5; WinterDate=1-Apr; WinterU=6; WinterCona=3.5; DiffusConst=40; DiffusSlope=16; Salb=0.13; CN2Bare=73; CNRed=20; CNCov=0.8; DischargeWidth=5; CatchmentArea=10; PSIDul=-100; Thickness=[150, 150, 300, 300, 300, 300, 300, 300, 300, 300, 300]; SWCON=[0.3, 0.3, 0.3, 0.3, 0.3, 0.3, 0.3, 0.3, 0.3, 0.3, 0.3]
        CERESSoilTemperature Temperature
        Solute NO3: Thickness=[150, 150, 300, 300, 300, 300, 300, 300, 300, 300, 300]; InitialValuesUnits=ppm; WaterTableConcentration=0; D0=0; DepthConstant=0; MaxDepthSoluteAccessible=0; RunoffEffectivenessAtMovingSolute=0; MaxEffectiveRunoff=0
          InitialValues=[6.503, 2.101, 2.101, 1.701, 1.701, 1.701, 1.701, 1.701, 1.701, 1.701, 1.701]
        Solute NH4: Thickness=[150, 150, 300, 300, 300, 300, 300, 300, 300, 300, 300]; InitialValuesUnits=ppm; WaterTableConcentration=0; D0=0; DepthConstant=0; MaxDepthSoluteAccessible=0; RunoffEffectivenessAtMovingSolute=0; MaxEffectiveRunoff=0
          InitialValues=[0.599004, 0.100001, 0.100001, 0.100001, 0.100001, 0.100001, 0.100001, 0.100001, 0.100001, 0.100001, 0.100001]
        Solute UREA: Thickness=[150, 150, 300, 300, 300, 300, 300, 300, 300, 300, 300]; InitialValues=[0, 0, 0, 0, 0, 0, 0, 0, 0, 0, 0]; InitialValuesUnits=kg/ha; WaterTableConcentration=0; D0=0; DepthConstant=0; MaxDepthSoluteAccessible=0; RunoffEffectivenessAtMovingSolute=0; MaxEffectiveRunoff=0
        Organic: FOMCNRatio=40; CarbonUnits=Total
          Thickness  Carbon  SoilCNRatio  FBiom  FInert  FOM
          150        1.04    12.5         0.025  0.4     48.1286
          150        0.89    12.5         0.02   0.6     41.4247
          300        0.89    12.5         0.015  0.8     30.6882
          300        0.89    12.5         0.01   0.9     22.7344
          300        0.77    12.5         0.01   0.95    16.842
          300        0.45    12.5         0.01   0.95    12.4769
          300        0.27    12.5         0.01   0.95    9.2431
          300        0.22    12.5         0.01   0.95    6.84746
          300        0.16    12.5         0.01   0.95    5.07272
          300        0.13    12.5         0.01   0.95    3.75796
          300        0.12    12.5         0.01   0.95    2.78397
        Chemical: PHUnits=Water
          Thickness  PH   EC
          150        8.4  0.2
          150        8.8  0.25
          300        9    0.31
          300        9.2  0.4
          300        9.2  0.59
          300        9.1  0.84
          300        9    0.93
          300        9    1.01
          300        8.9  1.06
          300        8.9  1.05
          300        8.9  1.01
        Nutrient
      SurfaceOrganicMatter: InitialResidueName=wheat; InitialResidueType=wheat; InitialResidueMass=1000; InitialStandingFraction=0; InitialCPR=0; InitialCNR=80
      Fertiliser
      Plant wheat: ResourceName=Wheat
      Folder Manager folder
        Manager Crop Management
```csharp
using Models.Soils;
using System;
using Models.Core;
namespace Models
{
    [Serializable]
    [System.Xml.Serialization.XmlInclude(typeof(Model))]
    public class Script : Model
    {

    /*
      
   [Link()]  public Simulation MySimulation;
   
   [Param()] private string crop;         // The module name of this crop
   [Param()] private string date1;         //Start of sowing window
   [Param()] private string date2;         //End of sowing window
   [Param()] private string date3;         //date to change to different cultivar
   [Param()] int esw_amount;
   [Param()] private string must_sow;

   [Input()] private DateTime today;

   // Rainfall accumulator
   [Param()] int rain_days;              //check for rain over this period
   [Param()] int rain_amount;            //this much rain over that period

   // Daily rainfall from the system
   [Input] private double rain;
   private ManagerUtility.Tracker<double> rainTracker; 

   private bool inWindow = false;
   private bool endOfWindow = false;
   private bool ChangeCultivar = false;

   //initialise tracker, telling it how many days to track
   [EventHandler] public void OnInitialised()
   {
      rainTracker = new ManagerUtility.Tracker<double>(rain_days); 
   }

   // Daily tests common to all paddocks
   [EventHandler] public void OnPrepare()
   {
      bool startOfWindow = DateUtility.DatesEqual(date1, today);

      inWindow = DateUtility.WithinDates(date1, today, date2);
      ChangeCultivar = false;
      if(date3 != "na")  
         ChangeCultivar = DateUtility.WithinDates(date3, today, date2);
      endOfWindow = DateUtility.DatesEqual(date2, today);

      rainTracker.Add(rain);
      string currentPaddock = "";
      if (MySimulation.Get("currentPaddock", out currentPaddock) == false) 
      {
         // If there is no sequencer plugged in then we are it..
         if (canEnter > 0) {
            OnEnter();
         }
         if (canLeave > 0) {
            OnLeave();
         }
      }
   }
   // Test whether we can sow a crop today
   // +ve number - yes
   // 0          - no
   // -ve number - no, out of scope (planting window)
   [Output, Description("Test whether we can sow a crop today")] public int canEnter  {
      get {
         bool isPossibleToday = false;
         
         string currentPaddock;
         MySimulation.Get("currentPaddock", out currentPaddock);
         //Console.WriteLine("1. '" + currentPaddock + "'");

         Component paddockModule;
         if (currentPaddock != "")
            paddockModule = (Component) MySimulation.LinkByName(currentPaddock);
         else
            paddockModule = (Component) MySimulation.ChildPaddocks[0];
         //Console.WriteLine("2. " + paddockModule.Name);

         Component cropModule = (Component) paddockModule.LinkByName( crop );

         //Console.WriteLine("3. " + cropModule.Name);
         string plantStatus = "";
         cropModule.Get("plant_status", out plantStatus);

         double esw = 0.0;
         Component soilModule = (Component) paddockModule.LinkByType("SoilWat");
         soilModule.Get("esw", out esw);
         if (plantStatus == "out" &&
             inWindow &&
             rainTracker.Sum() >= rain_amount &&
             esw > esw_amount) 
         {
             isPossibleToday = true;
         } 

         if (isPossibleToday)
            return 1;
         
         if (plantStatus == "out" && endOfWindow && must_sow == "yes")
            return 1;

         if (plantStatus == "out" && !inWindow)
            return -1;
         
         return 0;
      }
   }  
   
   
   // Sow a crop
   [Param()] private string cultivar1;
   [Param()] private string cultivar2;
   [Param()] private double density1;
   [Param()] private double depth1;
   [Param()] private double row_spacing1;
   [Param()] private string ftn1;
   [Param()] private string skiprow1;
   [Param()] private string tillageImplement;
   
   [EventHandler, Description("Sow the crop")] public void OnEnter()
   {
      Console.WriteLine(today + " Sowing Crop");
      SowType data = new SowType();
      data.Cultivar = cultivar1;
      if(ChangeCultivar)
         data.Cultivar = cultivar2;

      data.plants = density1;
      data.sowing_depth = depth1;
      data.row_spacing = row_spacing1;
      data.tiller_no_fertile = (ftn1 == "na") ? "" : ftn1;
      data.SkipRow = 0 ;
      if (skiprow1 == "single")
         data.SkipRow = 1;
      else if (skiprow1 == "double")
         data.SkipRow = 2;

      string currentPaddock;
      MySimulation.Get("currentPaddock", out currentPaddock);
      Component cropModule;
      if (currentPaddock != "")
         cropModule = (Component) MySimulation.LinkByName(currentPaddock + "." + crop);
      else 
         cropModule = (Component) MySimulation.ChildPaddocks[0].LinkByName(crop);

      cropModule.Publish("Sow", data);

      if (tillageImplement.ToLower() != "na") 
      {
         TillageType t = new TillageType();
         t.type = tillageImplement;
         Component paddockModule;
         if (currentPaddock != "")
            paddockModule = (Component) MySimulation.LinkByName(currentPaddock);
         else
            paddockModule = MySimulation.ChildPaddocks[0];
         paddockModule.Publish("tillage", t);
      }         
   }

   // Test whether we can harvest a crop today
   // +ve number - yes
   // 0          - no
   // -ve        - out of scope
   [Output] public int canLeave  
   {
      get 
      {
         string currentPaddock;
         MySimulation.Get("currentPaddock", out currentPaddock);

         string plantStatus = "";
         MySimulation.Get((currentPaddock != "" ? currentPaddock + "." : "") + crop + ".plant_status", out plantStatus);
         if (plantStatus == "out")
            return -1;

         string StageName = "";
         MySimulation.Get((currentPaddock != "" ? currentPaddock + "." : "") + crop + ".StageName", out StageName);
         if (StageName == "harvest_ripe" || plantStatus == "dead")
            return 1;
         return 0;
      }
   }

   [EventHandler] public void OnLeave()
   {
      Console.WriteLine(today + " Harvesting Crop");
      HarvestType hdata = new HarvestType();
      hdata.Remove = 0.0;
      string currentPaddock;
      MySimulation.Get("currentPaddock", out currentPaddock);
      Component cropModule;
      if (currentPaddock != "")
         cropModule = (Component) MySimulation.LinkByName(currentPaddock + "." + crop);
      else 
         cropModule = (Component) MySimulation.ChildPaddocks[0].LinkByName(crop);

      cropModule.Publish("harvest", hdata);

      KillPlantType kdata = new KillPlantType();
      kdata.KillFraction = 0.0F;
      cropModule.Publish("killcrop", kdata);
      cropModule.Publish("end_crop");
   } 

*/
    }
}
```
        Manager Fertilise at Sowing
```csharp
using Models.Soils;
using System;
using System.Collections.Generic;
using Models.Core;
namespace Models
{
    [Serializable]
    [System.Xml.Serialization.XmlInclude(typeof(Model))]
    public class Script : Model
    {

    /*
      
   [Link]  public Simulation MySimulation;
   [Param] string fertType;
   [Param] float fertAmt;
   [Param] string ModuleName;
   [Param] string EventName;
   
   [EventHandler] public void OnStart_Simulation()
   {
      foreach (Paddock paddock in MySimulation.ChildPaddocks) 
      {
         foreach (Component child in paddock.Children) {
            if(child.Name == ModuleName){
               RuntimeEventHandler.NullFunction curried = () => OnTrigger(paddock.Name);
               MySimulation.Subscribe(child.FullName + "." + EventName, curried);
               //Console.WriteLine("Subscribed '" + child.FullName + "." + EventName + " => " + paddock.Name + "'"); 
            }
         }
      }
   }

   public void OnTrigger(string paddock)
   {
      Console.WriteLine("Fertiliser OnTrigger called, paddock='" + paddock + "'"); 
      if (fertAmt > 0) 
      {         
         Component paddockModule;
         if (paddock != "")
            paddockModule = (Component) MySimulation.LinkByName(paddock);
         else
            paddockModule = (Component) MySimulation.ChildPaddocks[0];
         //Console.WriteLine("2. " + paddockModule.Name);

         Fertiliser fertModule = (Fertiliser) paddockModule.LinkByName("Fertiliser");
         fertModule.Apply(fertAmt, 50, fertType);
      }
   }

*/
    }
}
```
      Report outputfile: EventNames=[Clock].DoReport
        VariableNames:
          [Clock].Today
          biomass
          yield
          grain_protein
          grain_size
          esw
      MicroClimate: a_interception=0; b_interception=1; c_interception=0; d_interception=0; SoilHeatFluxFraction=0; MinimumHeightDiffForNewLayer=0; NightInterceptionFraction=0; ReferenceHeight=2
    SoilArbitrator
  Experiment
    Factors
      Permutation
        Factor Nitrogen: Specification=[FertiliseSowing].Script.Amount=0 to 200 step 50
    Simulation Continuous Wheat1
      Weather
        FileName=/Users/whi492/Documents/Work/R met file calculations/DownloadMetfiles/Breeza.met
      Clock: Start=1947-01-01; End=1957-12-31
      Summary summaryfile
      Zone paddock: Area=1; Slope=0; AspectAngle=0; Altitude=50
        Soil: SoilType=Black Vertosol; Site=Jimbour; NearestTown=Jimbour, Q 4352; Region=South East Queensland; NaturalVegetation=Grassland, mainly Qld bluegrass; Latitude=0; Longitude=0
          Water: Thickness=[150, 150, 300, 300, 300, 300, 300, 300, 300, 300, 300]; RelativeTo=LL15; FilledFromTop=true
            InitialValues=[0.54, 0.53, 0.54, 0.54, 0.52, 0.5, 0.5, 0.48, 0.47, 0.46, 0.44]
          Physical: same as Continuous Wheat.paddock.Soil.Physical
          WaterBalance SoilWater: same as Continuous Wheat.paddock.Soil.SoilWater
          CERESSoilTemperature Temperature
          Solute NO3: Thickness=[150, 150, 300, 300, 300, 300, 300, 300, 300, 300, 300]; InitialValuesUnits=kg/ha; WaterTableConcentration=0; D0=0; DepthConstant=0; MaxDepthSoluteAccessible=0; RunoffEffectivenessAtMovingSolute=0; MaxEffectiveRunoff=0
            InitialValues=[6.503, 2.101, 2.101, 1.701, 1.701, 1.701, 1.701, 1.701, 1.701, 1.701, 1.701]
          Solute NH4: Thickness=[150, 150, 300, 300, 300, 300, 300, 300, 300, 300, 300]; InitialValues=[0.599, 0.1, 0.1, 0.1, 0.1, 0.1, 0.1, 0.1, 0.1, 0.1, 0.1]; InitialValuesUnits=ppm; WaterTableConcentration=0; D0=0; DepthConstant=0; MaxDepthSoluteAccessible=0; RunoffEffectivenessAtMovingSolute=0; MaxEffectiveRunoff=0
          Solute UREA: same as Continuous Wheat.paddock.Soil.UREA
          Organic: same as Continuous Wheat.paddock.Soil.Organic
          Chemical: same as Continuous Wheat.paddock.Soil.Chemical
          Nutrient
        SurfaceOrganicMatter: InitialResidueName=wheat; InitialResidueType=wheat; InitialResidueMass=1000; InitialStandingFraction=0; InitialCPR=0; InitialCNR=80
        Fertiliser
        Plant wheat: ResourceName=Wheat
        Report outputfile: EventNames=[wheat].Harvesting
          VariableNames:
            [Clock].Today
            [wheat].AboveGround.Wt
            [wheat].Grain.Wt
        MicroClimate: a_interception=0; b_interception=1; c_interception=0; d_interception=0; SoilHeatFluxFraction=0; MinimumHeightDiffForNewLayer=0; NightInterceptionFraction=0; ReferenceHeight=2
        Manager Sow on a fixed date
          Crop = [wheat]
          SowDate = 24-Jul
          CultivarName = Hartog
          SowingDepth = 50
          RowSpacing = 250
          Population = 100
```csharp
using APSIM.Shared.Utilities;
using Models.Utilities;
using Models.Soils;
using Models.PMF;
using Models.Core;
using System;

namespace Models
{
    [Serializable]
    public class Script : Model
    {
        [Link] Clock Clock;
        [Link] Fertiliser Fertiliser;
        [Link] Summary Summary;
        [Link] Soil Soil;
        
        [Description("Crop")]
        public IPlant Crop { get; set; }

        [Description("Sowing date (d-mmm)")]
        public string SowDate { get; set; }

        [Display(Type = DisplayType.CultivarName)]
        [Description("Cultivar to be sown")]
        public string CultivarName { get; set; }

        [Description("Sowing depth (mm)")]
        public double SowingDepth { get; set; }

        [Description("Row spacing (mm)")]
        public double RowSpacing { get; set; }

        [Description("Plant population (/m2)")]
        public double Population { get; set; }

        [EventSubscribe("DoManagement")]
        private void OnDoManagement(object sender, EventArgs e)
        {
            if (DateUtilities.WithinDates(SowDate, Clock.Today, SowDate))
            {
                Crop.Sow(population: Population, cultivar: CultivarName, depth: SowingDepth, rowSpacing: RowSpacing);    
            }
        }
    }
}
```
        Manager FertiliseSowing
          Crop = [wheat]
          FertiliserType = NO3N
          Amount = 0
```csharp
using Models.Soils;
using System;
using Models.Core;
using Models.PMF;
namespace Models
{
    [Serializable]
    public class Script : Model
    {
        [Link] Clock Clock;
        [Link] Fertiliser Fertiliser;
        
        [Description("Crop to be fertilised")]
        public IPlant Crop { get; set; }

        [Description("Type of fertiliser to apply? ")] 
        public Fertiliser.Types FertiliserType { get; set; }
    
        [Description("Amount of fertiliser to be applied (kg/ha)")]
        public double Amount { get; set; }
        
        [EventSubscribe("Sowing")]
        private void OnSowing(object sender, EventArgs e)
        {
            Model crop = sender as Model;
            if (Crop != null && crop.Name.ToLower() == (Crop as IModel).Name.ToLower())
                Fertiliser.Apply(Amount: Amount, Type: FertiliserType);
        }
    }
}
```
        Manager Harvesting
          Crop = [wheat]
```csharp
using APSIM.Shared.Utilities;
using Models.Utilities;
using Models.Soils;
using Models.PMF;
using Models.Core;
using System;

namespace Models
{
    [Serializable] 
    public class Script : Model
    {
        [Description("Crop")]
        public IPlant Crop { get; set; }
        
        [EventSubscribe("DoManagement")]
        private void OnDoManagement(object sender, EventArgs e)
        {
            if (Crop.IsReadyForHarvesting)
            {
                Crop.Harvest();
                Crop.EndCrop();
            }
        }
    }
}
```
      SoilArbitrator
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