Simulations: Version=159
  DataStore
    ExcelInput Observed: FileNames=[SerradellaAPSIMparameters.xlsx]; SheetNames=[Observed]
    PredictedObserved: PredictedTableName=Report; ObservedTableName=Observed; FieldNameUsedForMatch=SimulationID; FieldName2UsedForMatch=Clock.Today; AllColumns=false
  Experiment Canberra
    Factors SowFactors
      Permutation
        Factor SowDate: Specification=[Sow].Script.SowDate =20-mar, 03-may
        Factor Cv: Specification=[Sow].Script.CultivarName =Izmir, Goulburn, Eliza, King
    Simulation SimulationCan
      Clock: Start=2011-01-01; End=2018-12-31
      Summary SummaryFile
      Weather: FileName=canberra230309.met
      SoilArbitrator
      Zone Field: Area=1; Slope=0; AspectAngle=0; Altitude=50
        Report: EventNames=[Clock].EndOfDay
          VariableNames:
            [Clock].Today
            [Wheat].Phenology.HeadingDAS
        Fertiliser
        Soil: ASCOrder=Vertosol; ASCSubOrder=Black; SoilType=Clay; Site=Norwin; NearestTown=Norwin; Region=Darling Downs and Granite Belt; State=Queensland; Country=Australia; NaturalVegetation=Qld. Bluegrass, possible Qld. Blue gum; ApsoilNumber=900; Latitude=-27.581836; Longitude=151.320206; LocationAccuracy=+/- 20m
          DataSource=CSIRO Sustainable Ecosystems, Toowoomba; Characteriesd as part of the GRDC funded project"Doing it better, doing it smarter, managing soil water in Australian agriculture' 2011
          Comments=OC, CLL for all crops estimated-based on Bongeen Mywybilla Soil No1
          Physical
            Thickness  BD       AirDry    LL15      DUL       SAT       KS
            150        1.01056  0.13025   0.2605    0.521     0.588655  20
            150        1.07146  0.198689  0.248362  0.496723  0.565677  20
            300        1.09394  0.28      0.28      0.488438  0.557193  20
            300        1.15861  0.28      0.28      0.480297  0.532787  20
            300        1.17301  0.28      0.28      0.471584  0.527354  20
            300        1.16287  0.28      0.28      0.457071  0.53118   20
            300        1.1875   0.28      0.28      0.452332  0.521888  20
            SoilCrop WheatSoil: LL=[0.261, 0.248, 0.28, 0.306, 0.36, 0.392, 0.446]; KL=[0.06, 0.06, 0.06, 0.04, 0.04, 0.02, 0.01]; XF=[1, 1, 1, 1, 1, 1, 1]
          WaterBalance SoilWater: SummerDate=1-Nov; SummerU=5; SummerCona=5; WinterDate=1-Apr; WinterU=5; WinterCona=5; DiffusConst=40; DiffusSlope=16; Salb=0.12; CN2Bare=73; CNRed=20; CNCov=0.8; PSIDul=-100; Thickness=[150, 150, 300, 300, 300, 300, 300]; SWCON=[0.3, 0.3, 0.3, 0.3, 0.3, 0.3, 0.3]
          Organic: FOMCNRatio=40; CarbonUnits=Total
            Thickness  Carbon  SoilCNRatio  FBiom  FInert  FOM
            150        1.2     12           0.04   0.4     347.129
            150        0.96    12           0.02   0.6     270.344
            300        0.6     12           0.02   0.8     163.972
            300        0.3     12           0.02   1       99.4541
            300        0.18    12           0.01   1       60.322
            300        0.12    12           0.01   1       36.5871
            300        0.12    12           0.01   1       22.1912
          Chemical: Thickness=[150, 150, 300, 300, 300, 300, 300]; PH=[8, 8, 8, 8, 8, 8, 8]; PHUnits=Water
          Water: Thickness=[150, 150, 300, 300, 300, 300, 300]; InitialPAWmm=361.245; RelativeTo=LL15; FilledFromTop=false
            InitialValues=[0.521, 0.496723, 0.488438, 0.480297, 0.471584, 0.457071, 0.452332]
          CERESSoilTemperature Temperature
          Nutrient
          Solute NO3: Thickness=[150, 150, 300, 300, 300, 300, 300]; InitialValues=[1, 1, 1, 1, 1, 1, 1]; InitialValuesUnits=ppm; WaterTableConcentration=0; D0=0; DepthConstant=0; MaxDepthSoluteAccessible=0; RunoffEffectivenessAtMovingSolute=0; MaxEffectiveRunoff=0
          Solute NH4: Thickness=[150, 150, 300, 300, 300, 300, 300]; InitialValues=[0.1, 0.1, 0.1, 0.1, 0.1, 0.1, 0.1]; InitialValuesUnits=ppm; WaterTableConcentration=0; D0=0; DepthConstant=0; MaxDepthSoluteAccessible=0; RunoffEffectivenessAtMovingSolute=0; MaxEffectiveRunoff=0
          Solute Urea: Thickness=[150, 150, 300, 300, 300, 300, 300]; InitialValues=[0, 0, 0, 0, 0, 0, 0]; InitialValuesUnits=kg/ha; WaterTableConcentration=0; D0=0; DepthConstant=0; MaxDepthSoluteAccessible=0; RunoffEffectivenessAtMovingSolute=0; MaxEffectiveRunoff=0
        SurfaceOrganicMatter: InitialResidueName=wheat_stubble; InitialResidueType=wheat; InitialResidueMass=500; InitialStandingFraction=0; InitialCPR=0; InitialCNR=100
        Plant Wheat
          Cultivar Goulburn
            Command:
              [Phenology].HeadEmergencePpSensitivity.FixedValue = 1
              [Phenology].Phyllochron.BasePhyllochron.FixedValue = 122
              [Phenology].PhyllochronPpSensitivity.FixedValue = 0.66
              [Phenology].CAMP.FLNparams.MinLN = 7.0
              [Phenology].CAMP.FLNparams.PpLN = 0
              [Phenology].CAMP.FLNparams.VrnLN = 19
              [Phenology].CAMP.FLNparams.VxPLN = -9
              [Phenology].CAMP.EnvData.VrnTreatTemp = 5
              [Phenology].CAMP.EnvData.VrnTreatDuration = 50
              [Phenology].HeadEmergenceLongDayBase.FixedValue = 0
          Cultivar Izmir
            Command:
              [Phenology].HeadEmergencePpSensitivity.FixedValue = 1
              [Phenology].Phyllochron.BasePhyllochron.FixedValue = 109
              [Phenology].PhyllochronPpSensitivity.FixedValue = 0.84
              [Phenology].CAMP.FLNparams.MinLN = 7.0
              [Phenology].CAMP.FLNparams.PpLN = 0
              [Phenology].CAMP.FLNparams.VrnLN = 8
              [Phenology].CAMP.FLNparams.VxPLN = -4
              [Phenology].CAMP.EnvData.VrnTreatTemp = 5
              [Phenology].CAMP.EnvData.VrnTreatDuration = 50
              [Phenology].HeadEmergenceLongDayBase.FixedValue = 0
          Cultivar Avila (disabled)
            Command:
              [Phenology].HeadEmergencePpSensitivity.FixedValue = 1
              [Phenology].Phyllochron.BasePhyllochron.FixedValue = 129
              [Phenology].PhyllochronPpSensitivity.FixedValue = 0.78
              [Phenology].CAMP.FLNparams.MinLN = 7.0
              [Phenology].CAMP.FLNparams.PpLN = 4
              [Phenology].CAMP.FLNparams.VrnLN = 8
              [Phenology].CAMP.FLNparams.VxPLN = -9
              [Phenology].CAMP.EnvData.VrnTreatTemp = 5
              [Phenology].CAMP.EnvData.VrnTreatDuration = 50
              [Phenology].HeadEmergenceLongDayBase.FixedValue = 0
          Cultivar King
            Command:
              [Phenology].HeadEmergencePpSensitivity.FixedValue = 1
              [Phenology].Phyllochron.BasePhyllochron.FixedValue = 150
              [Phenology].PhyllochronPpSensitivity.FixedValue = 0.82
              [Phenology].CAMP.FLNparams.MinLN = 5
              [Phenology].CAMP.FLNparams.PpLN = 0
              [Phenology].CAMP.FLNparams.VrnLN = 12
              [Phenology].CAMP.FLNparams.VxPLN = 0
              [Phenology].CAMP.EnvData.VrnTreatTemp = 5
              [Phenology].CAMP.EnvData.VrnTreatDuration = 50
              [Phenology].HeadEmergenceLongDayBase.FixedValue = 0
          Cultivar Eliza
            Command:
              [Phenology].HeadEmergencePpSensitivity.FixedValue = 1
              [Phenology].Phyllochron.BasePhyllochron.FixedValue = 108
              [Phenology].PhyllochronPpSensitivity.FixedValue = 0.79
              [Phenology].CAMP.FLNparams.MinLN = 8.0
              [Phenology].CAMP.FLNparams.PpLN = 1
              [Phenology].CAMP.FLNparams.VrnLN = 4
              [Phenology].CAMP.FLNparams.VxPLN = -2
              [Phenology].CAMP.EnvData.VrnTreatTemp = 5
              [Phenology].CAMP.EnvData.VrnTreatDuration = 50
              [Phenology].HeadEmergenceLongDayBase.FixedValue = 0
          Cultivar Serratas (disabled)
            Command:
              [Phenology].HeadEmergencePpSensitivity.FixedValue = 1
              [Phenology].Phyllochron.BasePhyllochron.FixedValue = 122
              [Phenology].PhyllochronPpSensitivity.FixedValue = 0.66
              [Phenology].CAMP.FLNparams.MinLN = 7.0
              [Phenology].CAMP.FLNparams.PpLN = 0
              [Phenology].CAMP.FLNparams.VrnLN = 19
              [Phenology].CAMP.FLNparams.VxPLN = -9
              [Phenology].CAMP.EnvData.VrnTreatTemp = 5
              [Phenology].CAMP.EnvData.VrnTreatDuration = 50
              [Phenology].HeadEmergenceLongDayBase.FixedValue = 0
        MicroClimate: a_interception=0; b_interception=1; c_interception=0; d_interception=0; SoilHeatFluxFraction=0.4; MinimumHeightDiffForNewLayer=0; NightInterceptionFraction=0.5; ReferenceHeight=2
        Manager SowingFertiliser
          Amount = 160
          CropName = wheat
```csharp
using Models.Soils;
using System;
using Models.Core;
using Models.PMF;
namespace Models
{
    [Serializable]
    public class Script : Model
    {
        [Link] Clock Clock;
        [Link] Fertiliser Fertiliser;
        [Link] Summary Summary;
        
        
        [Description("Amount of fertiliser to be applied (kg/ha)")]
        public double Amount { get; set;}
        
        [Description("Crop to be fertilised")]
        public string CropName { get; set;}
        
        
        

        [EventSubscribe("Sowing")]
        private void OnSowing(object sender, EventArgs e)
        {
            Model crop = sender as Model;
            if (crop.Name.ToLower()==CropName.ToLower())
                Fertiliser.Apply(Amount: Amount, Type: Fertiliser.Types.NO3N);
        }
        
    }
}
```
        Manager Harvest
```csharp
using Models.Soils.Nutrients;
using System;
using Models.Core;
using Models.PMF;
using Models.Soils;
using Models.Soils.Nutrients;
using Models.Utilities;
using APSIM.Shared.Utilities;

namespace Models
{
    [Serializable]
    public class Script : Model
    {
        [Link] Plant Wheat;

        [EventSubscribe("DoManagement")]
        private void OnDoManagement(object sender, EventArgs e)
        {
            if (Wheat.IsReadyForHarvesting)
            {
               Wheat.Harvest();
               Wheat.EndCrop();    
            }
        
        }
        
    }
}
```
        Manager Sow
          SowDate = 24-Jul
          CultivarName = Izmir
          Crop = [Wheat]
          SowingDepth = 50
          RowSpacing = 750
          Population = 6
```csharp
using Models.Soils.Nutrients;
using System.Linq;
using System;
using Models.Core;
using Models.PMF;
using Models.Soils;
using Models.Soils.Nutrients;
using Models.Utilities;
using APSIM.Shared.Utilities;

namespace Models
{
    [Serializable]
    public class Script : Model
    {
        [Link] Clock Clock;
        [Link] Fertiliser Fertiliser;
        [Link] Summary Summary;
        [Link] Soil Soil;
        Accumulator accumulatedRain;
        
        [Description("Crop")]
        public IPlant Crop { get; set; }
        [Description("Sowing date (d-mmm)")]
        public string SowDate { get; set; }
    [Display(Type = DisplayType.CultivarName, PlantName = "Barley")]
        [Description("Cultivar to be sown")]
        public string CultivarName { get; set; }
        [Description("Sowing depth (mm)")]
        public double SowingDepth { get; set; }
        [Description("Row spacing (mm)")]
        public double RowSpacing { get; set; }
        [Description("Plant population (/m2)")]
        public double Population { get; set; }
        


        [EventSubscribe("DoManagement")]
        private void OnDoManagement(object sender, EventArgs e)
        {
            if (DateUtilities.WithinDates(SowDate, Clock.Today, SowDate))
            {
                Crop.Sow(population: Population, cultivar: CultivarName, depth: SowingDepth, rowSpacing: RowSpacing);    
            }
        
        }
        
    }
}
```
  Experiment Cowra
    Factors SowFactors
      Permutation
        Factor SowDate: Specification=[Sow].Script.SowDate =4-apr, 07-may
        Factor Cv: Specification=[Sow].Script.CultivarName =Izmir, Goulburn, Eliza, King
    Simulation SimulationCow
      Clock: Start=2011-01-01; End=2018-12-31
      Summary SummaryFile
      Weather: FileName=cowra230310.met
      SoilArbitrator
      Zone Field: same as Canberra.SimulationCan.Field
  Experiment Tamworth
    Factors SowFactors
      Permutation
        Factor SowDate: Specification=[Sow].Script.SowDate =19-mar, 01-may
        Factor Cv: Specification=[Sow].Script.CultivarName =Izmir, Goulburn, Eliza, King
    Simulation SimulationTam
      Clock: Start=2011-01-01; End=2018-12-31
      Summary SummaryFile
      Weather: FileName=tamworth230310.met
      SoilArbitrator
      Zone Field: same as Canberra.SimulationCan.Field
  Experiment Perth
    Factors SowFactors
      Permutation
        Factor SowDate: Specification=[Sow].Script.SowDate =23-mar, 02-may
        Factor Cv: Specification=[Sow].Script.CultivarName =Izmir, Goulburn, Eliza, King
    Simulation SimulationPer
      Clock: Start=2011-01-01; End=2018-12-31
      Summary SummaryFile
      Weather: FileName=perth230310.met
      SoilArbitrator
      Zone Field: same as Canberra.SimulationCan.Field
  Folder Matching predicted and observed data
    Memo Notes
      Once observed data has been imported, you can add a 'PredictedObserved' model to the DataStore.
      You can then specify the name of the predicted table (usually the name of your report model e.g. DailyReport in our example) and observed table. You then need to specify one or more 'match fields' (column names) from the observed table to match on. Generally, this is SimulationID and Clock.Today. When the simulation is run (or when the DataStore is refreshed - right click on DataStore), the 'PredictedObserved' model will iterate through each value in the observed table and try and find a matching predicted value using the values of the 'match fields' (SimulationID and Clock.Today in our example).

      **NOTE:**

      For this to work though, it is important to ensure the column names in the spreadsheet **exactly** match the column names in the predicted (report) table. The simulation names also need to **exactly** match.

      ![](PredictedObserved.png)

      In the figure above, you can see the value of Barley.Leaf.LAI from the observed table was matched to the predicted value where the simulation name and Clock.Today values matched.

      You might also notice that the Predicted Observed table doesn't include above ground biomass. This is because the column name in the observed table (Barley.AboveGround.Wt) doesn't match the column name in the predicted table ((Barley.AboveGroundLive.Wt).

      The graph below was created with a series that points to the 'PredictedObserved' table and plots Predicted.Barley.Leaf.LAI against Observed.Barley.Leaf.LAI. This would not have been possible without the PredictedObserved model matching fields between 2 tables. The graph series also has a child 'Regression' model under it that displays the regression line.
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