Simulations: Version=156
  Folder Replacements
  DataStore
    Probability: TableName=HarvestReport; Exceedence=false; FieldToSplitOn=SimulationName
  Experiment
    Factors
      Permutation
        Factor SowSW: Specification=[Water].FractionFull=0,0.2,0.4,0.6,0.8,1.0
        Factor Site: Specification=[Weather].FileName = Cecil Plains.met
    Simulation Base
      Memo
        Simple example simulation based in Gatton with the cultivar Jade.
      Summary summaryfile
      SoilArbitrator Soil Arbitrator
      Clock: Start=1990-10-01; End=2020-10-01
      Weather: FileName=Cecil Plains.met
      Zone paddock: Area=1; Slope=0; AspectAngle=0; Altitude=50
        Irrigation
        Fertiliser
        SurfaceOrganicMatter: InitialResidueName=wheat; InitialResidueType=wheat; InitialResidueMass=500; InitialStandingFraction=0; InitialCPR=0; InitialCNR=40
        Manager HarvestRule
```csharp
using Models.PMF.Phen;
using APSIM.Shared.Utilities;
using System.Xml.Serialization;
using Models;
using Models.PMF;
using Models.Soils;
using System.Text;
using System.Collections.Generic;
using Models.Core;
using System;
using Models.Soils.Nutrients;

namespace Models
{
    [Serializable] 
    public class Script : Model
    {      
        [Link] private Plant Mungbean;
        [Link] private Zone zone;
        [Link(Type = LinkType.Path, Path = "[Mungbean].Phenology")]
        private Phenology phenology;
                    
        
        [EventSubscribe("StartOfSimulation")]
        private void OnSimulationCommencing(object sender, EventArgs e)
        {
        }       
        
        [EventSubscribe("DoManagement")]
        private void OnDoManagement(object sender, EventArgs e)
        {
        if (phenology.CurrentPhase.Name=="ReadyForHarvesting")
           {
           Mungbean.Harvest();
           Mungbean.EndCrop();
           }
        }
        
        [EventSubscribe("DoManagementCalculations")]
        private void OnDoManagementCalculations(object sender, EventArgs e)
        {
            
        }
    }
}
```
        Manager Sow using a variable rule
          Crop = [Mungbean]
          StartDate = 1-nov
          EndDate = 10-jan
          MinESW = 80
          MinRain = 20
          RainDays = 7
          CultivarName = Jade
          SowingDepth = 30
          RowSpacing = 250
          Population = 30
```csharp
using Models.Interfaces;
using APSIM.Shared.Utilities;
using Models.Utilities;
using Models.Soils;
using Models.PMF;
using Models.Core;
using System;
using Models.Climate;

namespace Models
{
    [Serializable]
    public class Script : Model
    {
        [Link] private Clock Clock;
        [Link] private Fertiliser Fertiliser;
        [Link] private Summary Summary;
        [Link] private Soil Soil;
        private Accumulator accumulatedRain;
        [Link]
        private ISoilWater waterBalance;
        
        [Description("Crop")]
        public IPlant Crop { get; set; }

        [Description("Start of sowing window (d-mmm)")]
        public string StartDate { get; set; }

        [Description("End of sowing window (d-mmm)")]
        public string EndDate { get; set; }

        [Description("Minimum extractable soil water for sowing (mm)")]
        public double MinESW { get; set; }

        [Description("Accumulated rainfall required for sowing (mm)")]
        public double MinRain { get; set; }

        [Description("Duration of rainfall accumulation (d)")]
        public int RainDays { get; set; }

        [Display(Type = DisplayType.CultivarName)]
        [Description("Cultivar to be sown")]
        public string CultivarName { get; set; }

        [Description("Sowing depth (mm)")]
        public double SowingDepth { get; set; }

        [Description("Row spacing (mm)")]
        public double RowSpacing { get; set; }

        [Description("Plant population (/m2)")]
        public double Population { get; set; }
        
        
        [EventSubscribe("StartOfSimulation")]
        private void OnSimulationCommencing(object sender, EventArgs e)
        {
            accumulatedRain = new Accumulator(this, "[Weather].Rain", RainDays);
        }

        [EventSubscribe("DoManagement")]
        private void OnDoManagement(object sender, EventArgs e)
        {
            accumulatedRain.Update();
            
            if (DateUtilities.WithinDates(StartDate, Clock.Today, EndDate) &&
                !Crop.IsAlive &&
                MathUtilities.Sum(waterBalance.ESW) > MinESW &&
                accumulatedRain.Sum > MinRain)
            {
                Crop.Sow(population: Population, cultivar: CultivarName, depth: SowingDepth, rowSpacing: RowSpacing);    
            }
        }
    }
}
```
        Manager Reset on sowing
          ResetWater = Yes
          ResetNutrients = No
          ResetSOM = No
```csharp
using Models.Soils.Nutrients;
using APSIM.Shared.Utilities;
using Models.Surface;
using Models.Utilities;
using Models.Soils.Nutrients;
using Models.Soils;
using Models.PMF;
using Models.Core;
using System;
using Models.Interfaces;

namespace Models
{
    [Serializable]
    public class Script : Model
    {
        [Link] private Plant Wheat;
        [Link] private ISoilWater SoilWater;
        [Link] private Nutrient nutrient;
        [Link] private SurfaceOrganicMatter SOM;
        [Link] private Summary Summary;

        [Description("Reset Water? (Yes or No)")]
        public string ResetWater {get;set;}

        [Description("Reset Soil Nutrients? (Yes or No)")]
        public string ResetNutrients {get;set;}

        [Description("Reset Surface Organic Matter? (Yes or No)")]
        public string ResetSOM {get;set;}

        [EventSubscribe("Sowing")]
        private void OnSowing(object sender, EventArgs e)
        {
            if (ResetWater == "Yes")
            {
                Summary.WriteMessage(this, "Reset Water", MessageType.Diagnostic);
                SoilWater.Reset();
            }
            if (ResetNutrients == "Yes")
            {
                Summary.WriteMessage(this, "Reset Nutrients", MessageType.Diagnostic);
                nutrient.Reset();
            }
            if (ResetSOM == "Yes")
            {
                Summary.WriteMessage(this, "Reset Surface OM", MessageType.Diagnostic);
                SOM.Reset();
            }
        }
    }
}
```
        Manager Irrigate to deficit at sowing (disabled)
          CropSoil = [mungbeanSoil]
          SowPAW = 150
```csharp
using Models.Soils;
using System;
using System.Linq;
using Models.Core;
using Models.PMF;
using APSIM.Shared.Utilities;
namespace Models
{
    [Serializable]
    public class Script : Model
    {
        [Link] Clock Clock;
        [Link] Irrigation Irrigation;
        [Link] Water Water;
        
      [Description("Crop soil module")] 
        public SoilCrop CropSoil { get; set;}

      [Description("Plant available water to reset at sowing (mm)")] 
        public double SowPAW { get; set; }
    
        public double CropPAW{ get; set; }
        public double Waterdeficit{ get; set; }
       
        [EventSubscribe("Sowing")]
        private void OnSowing(object sender, EventArgs e)
        {
         	CropPAW = Water.MM.Sum() - CropSoil.LLmm.Sum();
        	Waterdeficit = SowPAW - CropPAW;
        
           
            {
                    Irrigation.Apply(amount: Waterdeficit, depth: 0, efficiency: 1);
            }
        }
    }
}
```
        Report HarvestReport: EventNames=[Mungbean].Harvesting
          VariableNames:
            [Clock].Today
            [Clock].Today.Year
            [Mungbean].AboveGround.Wt
            [Mungbean].AboveGround.N
            [Mungbean].Grain.Total.Wt*10 as Yield
            [Mungbean].Grain.NConc
            [Mungbean].Grain.Size
            [Mungbean].Grain.Number
            [Mungbean].Grain.Total.Wt
            [Mungbean].Grain.Total.N
            [Mungbean].Total.Wt
            (sum([soil].Water.MM) - sum([mungbeanSoil].LLmm)) on [mungbean].Sowing as MungbeanSowPAW
        Report SowReport: EventNames=[mungbean].Sowing
          VariableNames:
            [clock].Today
            [mungbean].AboveGround.wt
            [mungbean].Grain.Wt
            [soil].Water.PAWmm
            (sum([soil].Water.MM) - sum([mungbeanSoil].LLmm)) as MungbeanPAW
            sum([soil].Water.PAWmm as ProfilePAW
            sum([mungbeanSoil].PAWCmm as MungPAW
            sum([soil].Water.MM as ProfileSW
            sum([mungbeanSoil].LLmm as MungCLL
        Report DailyReport: EventNames=[clock].EndOfDay
          VariableNames:
            [clock].Today
            [mungbean].AboveGround.wt
            [mungbean].Grain.Wt
            [soil].Water.PAWmm
            (sum([soil].Water.MM) - sum([mungbeanSoil].LLmm)) as MungbeanPAW
            sum([soil].Water.PAWmm as ProfilePAW
            sum([mungbeanSoil].PAWCmm as MungPAW
            sum([soil].Water.MM as ProfileSW
            sum([mungbeanSoil].LLmm as MungCLL
        Plant Mungbean
        Soil: ASCOrder=Vertosol; ASCSubOrder=Black; SoilType=Clay; Site=Brookstead; NearestTown=Brookstead, Q 4352; Region=Darling Downs and Granite Belt; State=Queensland; Country=Australia; NaturalVegetation=Queensland bluegrass; ApsoilNumber=6; Latitude=-27.736; Longitude=151.333; LocationAccuracy=+/- 20m; YearOfSampling=0; DataSource=CSIRO Sustainable Ecosystems, Toowoomba; Comments=Clay -
          Physical
            Thickness  BD    AirDry  LL15  DUL   SAT
            150        1.05  0.125   0.25  0.52  0.57
            150        1.16  0.216   0.27  0.48  0.53
            300        1.19  0.31    0.31  0.47  0.52
            300        1.18  0.31    0.31  0.47  0.52
            300        1.24  0.31    0.31  0.45  0.5
            300        1.31  0.31    0.31  0.42  0.47
            300        1.35  0.31    0.31  0.41  0.46
            BD, DUL source: Field measured and checked for sensibility
            AirDry, LL15 source: Estimated based on local knowledge
            SAT source: Calculated from measured, estimated or calculated BD
            SoilCrop cottonSoil: LL=[0.25, 0.27, 0.31, 0.31, 0.31, 0.31, 0.31]; KL=[0.1, 0.1, 0.1, 0.1, 0.09, 0.07, 0.05]; XF=[1, 1, 1, 1, 1, 1, 1]
              LL source: Field measured and checked for sensibility
            SoilCrop sorghumSoil: LL=[0.25, 0.27, 0.33, 0.32, 0.33, 0.34, 0.36]; KL=[0.07, 0.07, 0.07, 0.05, 0.05, 0.04, 0.03]; XF=[1, 1, 1, 1, 1, 1, 1]
              LL source: Field measured and checked for sensibility
            SoilCrop mungbeanSoil: LL=[0.25, 0.27, 0.31, 0.36, 0.41, 0.42, 0.41]; KL=[0.1, 0.1, 0.1, 0.1, 0.09, 0.07, 0.07]; XF=[1, 1, 1, 1, 1, 1, 1]
              LL source: Field measured and checked for sensibility
          WaterBalance SoilWater: SummerDate=1-Nov; SummerU=6; SummerCona=3.5; WinterDate=1-Apr; WinterU=4; WinterCona=2.5; DiffusConst=40; DiffusSlope=16; Salb=0.12; CN2Bare=73; CNRed=20; CNCov=0.8; PSIDul=-100; Thickness=[150, 150, 300, 300, 300, 300, 300]; SWCON=[0.3, 0.3, 0.3, 0.3, 0.3, 0.3, 0.3]
          Organic: FOMCNRatio=40; CarbonUnits=Total
            Thickness  Carbon  SoilCNRatio  FBiom  FInert  FOM
            150        1.19    12           0.04   0.4     347.129
            150        1.01    12           0.02   0.6     270.344
            300        0.45    12           0.02   0.8     163.972
            300        0.3     12           0.02   1       99.454
            300        0.2     12           0.01   1       60.322
            300        0.16    12           0.01   1       36.587
            300        0.17    12           0.01   1       22.191
          Chemical: Thickness=[150, 150, 300, 300, 300, 300, 300]; PH=[8.2, 8.5, 8.6, 8.6, 7.4, 5.3, 5.3]; PHUnits=Water
            PH source: Estimated based on local knowledge
          Nutrient
          Water: Thickness=[150, 150, 300, 300, 300, 300, 300]; InitialValues=[0.52, 0.48, 0.47, 0.47, 0.45, 0.42, 0.41]; RelativeTo=mungbean; FilledFromTop=true
          Solute NO3: Thickness=[150, 150, 300, 300, 300, 300, 300]; InitialValues=[1, 1, 1, 1, 1, 1, 1]; InitialValuesUnits=ppm; WaterTableConcentration=0; D0=0; DepthConstant=0; MaxDepthSoluteAccessible=0; RunoffEffectivenessAtMovingSolute=0; MaxEffectiveRunoff=0
          Solute NH4: Thickness=[150, 150, 300, 300, 300, 300, 300]; InitialValues=[0.1, 0.1, 0.1, 0.1, 0.1, 0.1, 0.1]; InitialValuesUnits=ppm; WaterTableConcentration=0; D0=0; DepthConstant=0; MaxDepthSoluteAccessible=0; RunoffEffectivenessAtMovingSolute=0; MaxEffectiveRunoff=0
          Solute Urea: Thickness=[150, 150, 300, 300, 300, 300, 300]; InitialValues=[0, 0, 0, 0, 0, 0, 0]; InitialValuesUnits=ppm; WaterTableConcentration=0; D0=0; DepthConstant=0; MaxDepthSoluteAccessible=0; RunoffEffectivenessAtMovingSolute=0; MaxEffectiveRunoff=0
          CERESSoilTemperature Temperature
        MicroClimate: a_interception=0; b_interception=1; c_interception=0; d_interception=0; SoilHeatFluxFraction=0.4; MinimumHeightDiffForNewLayer=0; NightInterceptionFraction=0.5; ReferenceHeight=2
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