Simulations: Version=156
  DataStore
  Folder FSD2018
    Experiment FSD2018
      Factors
        Permutation
          Factor N
            CompositeFactor 0: Specifications=[FertiliseWheat].Script.Amount=0
            CompositeFactor 65: Specifications=[FertiliseWheat].Script.Amount=21.64
            CompositeFactor 130: Specifications=[FertiliseWheat].Script.Amount=43.33
            CompositeFactor 195: Specifications=[FertiliseWheat].Script.Amount=65
          Factor Sow
            CompositeFactor Nov16
              Specifications:
                [FertiliseWheat].Script.Dates=16-nov-2018, 07-dec-2018, 04-jan-2019
                [Irrigate on fixed dates].Script.Dates=07-dec-2018, 04-jan-2019, 06-feb-2019, 06-apr-2019
            CompositeFactor Dec14
              Specifications:
                [FertiliseWheat].Script.Dates=14-dec-2018, 08-jan-2019, 04-feb-2019
                [Irrigate on fixed dates].Script.Dates=08-jan-2018, 04-feb-2019, 02-mar-2019, 06-apr-2019
      Simulation FSD2018Base
        Weather
          FileName=C:\Users\Mr. Laptop Point\Documents\ASPIM NextGen\FSD_Climate_2018-22.met
        Manager ClimateControl_2019
          date1 = 1-jan
          date2 = 31-dec
          MaxtChange = 0
          MintChange = 0
          RainChange = 0
          RadnChange = 0
          CO2 = 411
```csharp
using Models.Soils;
using System;
using Models.Core;
using Models.PMF;
namespace Models
{
    [Serializable]
    [System.Xml.Serialization.XmlInclude(typeof(Model))]
    public class Script : Model
    {
        [Link] Clock Clock;

        [Description("Enter window START date (dd-mmm) : ")]
        public string date1 { get; set; }

        [Description("Enter window END date (dd-mmm) : ")]
        public string date2 { get; set; }

        [Description("Change in maximum temperature (oC):")]
        public string MaxtChange { get; set; }

        [Description("Change in minimum temperature (oC):")]
        public string MintChange { get; set; }

        [Description("Relative change in daily rainfall (%):")]
        public string RainChange { get; set; }

        [Description("Relative change in daily radiation (%):")]
        public string RadnChange { get; set; }

        [Description("Atmospheric CO2 Concentration (ppm)")]
        public string CO2 { get; set; }

        [EventSubscribe("StartOfSimulation")]
        private void OnSimulationCommencing(object sender, EventArgs e)
        {
            /*
                co2 = [CO2]
tav = tav + ([MaxtChange] + [MintChange]) / 2
            
            */
        }
    }
}
```
        Manager ClimateControl_winter_rad_incr_19
          date1 = 01-nov
          date2 = 31-jan
          MaxtChange = 0
          MintChange = 0
          RainChange = 0
          RadnChange = 10
          CO2 = 411
          script: same as in FSD2018.FSD2018.FSD2018Base.ClimateControl_2019
        Clock: Start=2018-11-16; End=2019-04-30
        Summary summaryfile
        MicroClimate: a_interception=0; b_interception=1; c_interception=0; d_interception=0; SoilHeatFluxFraction=0; MinimumHeightDiffForNewLayer=0; NightInterceptionFraction=0; ReferenceHeight=2
        SoilArbitrator
        Zone paddock: Area=1; Slope=0; AspectAngle=0; Altitude=50
          Soil Lyllpur Series: SoilType=Lyallpur; Site=Faisalabad; NearestTown=Sheikhupura; Region=Punjab; Country=Pakistan; Latitude=31.25; Longitude=73.06
            Physical
              Thickness  BD    AirDry  LL15   DUL    SAT
              150        1.5   0.066   0.185  0.294  0.422
              770        1.51  0.12    0.162  0.293  0.414
              350        1.51  0.12    0.145  0.293  0.409
              250        1.53  0.121   0.133  0.313  0.423
              SoilCrop WheatSoil: LL=[0.185, 0.162, 0.145, 0.133]; KL=[0.1, 0.1, 0.08, 0.06]; XF=[1, 1, 1, 1]
            WaterBalance SoilWater: SummerDate=1-Apr; SummerU=3.2; SummerCona=6; WinterDate=1-Dec; WinterU=3.5; WinterCona=6; DiffusConst=40; DiffusSlope=16; Salb=0.13; CN2Bare=61; CNRed=20; CNCov=0.8; PSIDul=-100; Thickness=[150, 770, 350, 250]; SWCON=[0.3, 0.2, 0.2, 0.2]
            CERESSoilTemperature Temperature
            Solute NO3: Thickness=[150, 770, 350, 250]; InitialValues=[12.745, 28.72, 4.62, 1.255]; InitialValuesUnits=ppm; WaterTableConcentration=0; D0=0; DepthConstant=0; MaxDepthSoluteAccessible=0; RunoffEffectivenessAtMovingSolute=0; MaxEffectiveRunoff=0
            Solute NH4: Thickness=[150, 770, 350, 250]; InitialValues=[4, 3, 1, 1]; InitialValuesUnits=ppm; WaterTableConcentration=0; D0=0; DepthConstant=0; MaxDepthSoluteAccessible=0; RunoffEffectivenessAtMovingSolute=0; MaxEffectiveRunoff=0
            Solute UREA: Thickness=[150, 770, 350, 250]; InitialValues=[0, 0, 0, 0]; InitialValuesUnits=kg/ha; WaterTableConcentration=0; D0=0; DepthConstant=0; MaxDepthSoluteAccessible=0; RunoffEffectivenessAtMovingSolute=0; MaxEffectiveRunoff=0
            Organic: FOMCNRatio=40; CarbonUnits=Total
              Thickness  Carbon  SoilCNRatio  FBiom  FInert  FOM
              150        1.44    12.5         0.05   0.5     716.664
              770        0.91    12.5         0.055  0.65    156.784
              350        0.309   12.5         0.035  1       78.577
              250        0.15    12.5         0.01   1       47.974
            Water: Thickness=[150, 770, 350, 250]; InitialValues=[0.294, 0.293, 0.293, 0.227]; RelativeTo=LL15; FilledFromTop=true
            Chemical: Thickness=[150, 770, 350, 250]; PH=[7.8, 7.9, 8, 8]; PHUnits=Water
            Nutrient
          SurfaceOrganicMatter: InitialResidueName=wheat; InitialResidueType=wheat; InitialResidueMass=1000; InitialStandingFraction=0; InitialCPR=0; InitialCNR=80
          Fertiliser
          Irrigation
          Plant wheat: ResourceName=Wheat
          Report outputfile: VariableNames=no3(); EventNames=[Clock].DoReport
          Manager WheatSow
            Crop = [wheat]
            SowDate = 11/16/2018 00:00:00
            CultivarName = Whistler
            SowingDepth = 45
            RowSpacing = 250
            Population = 400
```csharp
using APSIM.Shared.Utilities;
using Models.Utilities;
using Models.Soils;
using Models.PMF;
using Models.Core;
using System;

namespace Models
{
    [Serializable]
    public class Script : Model
    {
        [Link] Clock Clock;
        [Link] Fertiliser Fertiliser;
        [Link] Summary Summary;
        [Link] Soil Soil;
        
        [Description("Crop")]
        public IPlant Crop { get; set; }

        [Description("Sowing date  (dd/mmm/yyyy)")]
        public DateTime SowDate { get; set; }
        
        [Display(Type = DisplayType.CultivarName)]
        [Description("Cultivar to be sown")]
        public string CultivarName { get; set; }

        [Description("Sowing depth (mm)")]
        public double SowingDepth { get; set; }

        [Description("Row spacing (mm)")]
        public double RowSpacing { get; set; }

        [Description("Plant population (/m2)")]
        public double Population { get; set; }

        [EventSubscribe("DoManagement")]
        private void OnDoManagement(object sender, EventArgs e)
        {
            if (DateUtilities.WithinDates(SowDate, Clock.Today, SowDate))
            {
                Crop.Sow(population: Population, cultivar: CultivarName, depth: SowingDepth, rowSpacing: RowSpacing);    
            }
        }
        private bool SameDate(DateTime d1, DateTime d2)
        {
            return d1.Year == d2.Year && d1.DayOfYear == d2.DayOfYear;
        }
    }
}
```
          Manager FertiliseWheat
            EachYear = False
            Dates = 16-nov-2018, 07-dec-2018, 04-jan-2019
            UseCritNThreshold = False
            CritNThreshold = 3000
            CritNDepth = 50
            Depth = 0
            Amount = 46
            FertiliserType = UreaN
```csharp
using Models.Interfaces;
using System.Linq;
using APSIM.Shared.Utilities;
using Models.PMF;
using Models.Soils;
using Models.Core;
using System;
using Models.Soils.Nutrients;

namespace Models
{
    [Serializable]
    public class Script : Model
    {
        [Link] private Clock clock;
        [Link] private Fertiliser fertiliser;
        [Link] private ISummary summary;
        [Link] private Soil soil;
        private Nutrient nutrient;
        private SoilNitrogen soilN;
        [Link]
        private IPhysical soilPhysical;


        [Separator("Fertiliser will be applied on the date(s) below")]
        [Description("Apply fertiliser on the same day(s) each year? If no, then must include the year of appliaction below")]
        public bool EachYear { get; set; }

        [Description("Dates for one or more fertiliser applications (dd-mmm or dd-mmm-yyyy) as a list with a comma between dates")]
        public string[] Dates { get; set; }

        [Separator("Test for the mineral N in the soil and don't apply the fertiliser if greater than X kgN/ha is stored in the soil above a depth of Y mm")]
        [Description("Use a critical soil mineral N to prevent application above a threshold?")]
        public bool UseCritNThreshold { get; set; }

        [Description("Don't add fertiliser if N in the soil to the depth below exceeds (kg/ha)")]
        public double CritNThreshold { get; set; }

        [Description("Depth to which the amount of N in the soil should be calculated (mm)")]
        public double CritNDepth { get; set; }

        [Separator("Fertiliser application details")]
        [Description("Depth at which to apply the fertiliser (mm)")]
        public double Depth { get; set; }

        [Description("Amount of fertiliser to apply (kg N /ha) per application")]
        public double Amount { get; set; }

        [Description("Fertiliser type - select from the list")]
        public Fertiliser.Types FertiliserType { get; set; }


        [EventSubscribe("StartOfSimulation")]
        private void FindSoilNOrNutrient(object sender, EventArgs e)
        {
            nutrient = this.FindInScope<Nutrient>() as Nutrient;
            soilN = this.FindInScope<SoilNitrogen>() as SoilNitrogen;

            if (nutrient == null && soilN == null)
                throw new Exception(string.Format("Error in script {0}: Unable to find nutrient or soilN.", Name));
        }

        [EventSubscribe("DoManagement")]
        private void OnDoManagement(object sender, EventArgs e)
        {
            if (OnApplicationDate())
            {
                if (NContentBelowThreshold())
                    fertiliser.Apply(Amount, FertiliserType, Depth);
                else
                    summary.WriteMessage(this, "Skipping fertiliser application due to soil mineral N content being above critical threshold.", MessageType.Diagnostic);
            }
        }

        /// <summary>Checks if today's date is one of the specified fertiliser application dates.</summary>
        private bool OnApplicationDate()
        {
            if (EachYear)
                return Dates.Any(d => DateUtilities.DatesEqual(d, clock.Today));
            
            DateTime[] dates = Dates.Select(d => DateTime.ParseExact(d, "d-MMM-yyyy", null)).ToArray();
            return dates.Any(d => SameDate(d, clock.Today));
        }

        /// <summary>Checks if N content in soil is below critical threshold.</summary>
        private bool NContentBelowThreshold()
        {
            if (!UseCritNThreshold)
                return true;
            
            double[] weights = GetLayerWeights();
            double cumSoilN = 0;

            for (int i = 0; i < soilPhysical.Thickness.Length; i++)
            {
                if (nutrient != null)
                    cumSoilN += weights[i] * nutrient.MineralN[i];
                else if (soilN != null)
                    cumSoilN += weights[i] * soilN.mineral_n[i];
            }

            return cumSoilN <= CritNThreshold;
        }

        private double[] GetLayerWeights()
        {
            double[] weights = new double[soilPhysical.Thickness.Length];
            double cumDepth = 0;

            for (int i = 0; i < soilPhysical.Thickness.Length; i++)
            {
                cumDepth += soilPhysical.Thickness[i];
                if (cumDepth < CritNDepth)
                    weights[i] = 1;
                else if (cumDepth - soilPhysical.Thickness[i] <= CritNDepth)
                    weights[i] = (CritNDepth - (cumDepth - soilPhysical.Thickness[i])) / soilPhysical.Thickness[i];
                else
                    weights[i] = 0;
            }

            return weights;
        }

        private bool SameDate(DateTime d1, DateTime d2)
        {
            return d1.Year == d2.Year && d1.DayOfYear == d2.DayOfYear;
        }
    }
}
```
          Manager Irrigate on fixed dates
            EachYear = False
            Dates = 07-dec-2018, 04-jan-2019, 06-feb-2019, 06-apr-2019
            Amount = 108
            Depth = 0
            Efficiency = 1
            WillRunoff = False
```csharp
using Models.Soils;
using System;
using Models.Core;
using Models.PMF;
using APSIM.Shared.Utilities;
using System.Linq;
using Models.Interfaces;
namespace Models
{
    [Serializable]
    public class Script : Model
    {
        [Link] Clock clock;
        [Link] Irrigation Irrigation;
        
        [Separator("A component to apply irrigation on one or more dates on every year of the simulation")]

        [Description("Apply fertiliser on the same day(s) each year? If no, then must include the year of appliaction below")]
        public bool EachYear { get; set; }

        [Description("Dates for one or more fertiliser applications (dd-mmm or dd-mmm-yyyy) as a list with a comma between dates")]
        public string[] Dates { get; set; }

        
        [Description("Amount of irrigation to be applied (mm)")] 
        public double Amount { get; set; }
        
        [Description("Depth in the soil to apply the  irrigation (mm)")] 
        public double Depth { get; set; }
        
        [Description("Efficiency of irrigation (0-1)")] 
        public double Efficiency { get; set; }
        
        [Description("Will the irrigation runoff?")] 
        public bool WillRunoff { get; set; }
        


        [EventSubscribe("DoManagement")]
        private void OnDoManagement(object sender, EventArgs e)
        {
            if (OnApplicationDate())
            {
                Irrigation.Apply(amount: Amount, depth: Depth, efficiency: Efficiency, willRunoff: WillRunoff);
               
            }
        }

        /// <summary>Checks if today's date is one of the specified fertiliser application dates.</summary>
        private bool OnApplicationDate()
        {
            if (EachYear)
                return Dates.Any(d => DateUtilities.DatesEqual(d, clock.Today));
            
            DateTime[] dates = Dates.Select(d => DateTime.ParseExact(d, "d-MMM-yyyy", null)).ToArray();
            return dates.Any(d => SameDate(d, clock.Today));
        }
                private bool SameDate(DateTime d1, DateTime d2)
        {
            return d1.Year == d2.Year && d1.DayOfYear == d2.DayOfYear;
        }
        }
        }
```
          Manager Harvest Wheat
            Crop = [wheat]
            HarvestDate = 04/30/2019 00:00:00
```csharp
using APSIM.Shared.Utilities;
using Models.Utilities;
using Models.Soils;
using Models.PMF;
using Models.Core;
using System;

namespace Models
{
    [Serializable]
    public class Script : Model
    {
        [Link] Clock Clock;
        [Link] Fertiliser Fertiliser;
        [Link] Summary Summary;
        [Link] Soil Soil;
        
        [Description("Crop")]
        public IPlant Crop { get; set; }

        [Description("Harvest date  (dd/mmm/yyyy)")]
        public DateTime HarvestDate { get; set; }
        

       
        [EventSubscribe("DoManagement")]
        private void OnDoManagement(object sender, EventArgs e)
        {
            if (DateUtilities.WithinDates(HarvestDate, Clock.Today, HarvestDate))
            {
                                Crop.Harvest();
                Crop.EndCrop();
            }
        }
        private bool SameDate(DateTime d1, DateTime d2)
        {
            return d1.Year == d2.Year && d1.DayOfYear == d2.DayOfYear;
        }
    }
}
```
