Simulations: Version=156
  Experiment DDRF
    Factors
      Permutation
        Factor RS: Specification=[SowingRule].Script.RowSpacing = 500, 1000, 1500
    Simulation
      Clock: Start=2021-01-01; End=2021-06-30
      Summary summaryfile
      Weather
        FileName=C:\Users\rhe005\OneDrive - CSIRO\Cotton NextGen\Validation data sets\NT_RS-DDRF2021\NT_RS-DDRF2021.met
      SoilArbitrator Soil Arbitrator
      Zone paddock: Area=1; Slope=0; AspectAngle=0; Altitude=50
        Report HarvestReport: EventNames=[Soybean].Harvesting
          VariableNames:
            [Clock].Today
            [Soybean].Phenology.Stage
            [Soybean].Phenology.CurrentStageName
            [Soybean].AboveGround.Wt
            [Soybean].AboveGround.N
            [Soybean].Grain.Total.Wt*10 as Yield
            [Soybean].Grain.NConc
            [Soybean].Grain.Size
            [Soybean].Grain.Number
            [Soybean].Grain.Total.Wt
            [Soybean].Grain.Total.N
            [Soybean].Total.Wt
        Fertiliser
        Soil Tindall: SoilType=Haplic Mesotrophic Red Dermosol; LocalName=Tindall; Site=RS-DDRF; NearestTown=Pine Creek; Region=Daly Basin; State=Northern Territory; Country=Australia; Latitude=-13.83; Longitude=131.21; YearOfSampling=2021; DataSource=CSIRO/NTDPI
          Water: RelativeTo=LL15; FilledFromTop=true
            Thickness=[300, 300, 300, 300, 300, 300, 300, 300, 300, 300, 300, 200]
            InitialValues=[0.2, 0.27, 0.23, 0.201, 0.15, 0.15, 0.15, 0.15, 0.15, 0.15, 0.15, 0.15]
          Physical
            Thickness  BD    AirDry  LL15   DUL   SAT
            300        1.55  0.04    0.062  0.2   0.36
            300        1.66  0.12    0.15   0.27  0.32
            300        1.55  0.135   0.15   0.23  0.37
            300        1.61  0.15    0.15   0.26  0.34
            300        1.55  0.15    0.15   0.25  0.36
            300        1.55  0.15    0.15   0.26  0.36
            300        1.62  0.15    0.15   0.27  0.34
            300        1.62  0.15    0.15   0.27  0.34
            300        1.62  0.15    0.15   0.27  0.34
            300        1.62  0.15    0.15   0.26  0.34
            300        1.75  0.15    0.15   0.26  0.31
            200        1.75  0.15    0.15   0.24  0.29
            DUL source: Field measured and checked for sensibility
            SoilCrop Soybean
              LL=[0.06, 0.15, 0.17, 0.19, 0.17, 0.19, 0.19, 0.19, 0.19, 0.19, 0.21, 0.21]
              KL=[0.1, 0.1, 0.1, 0.09, 0.07, 0.05, 0.03, 0.03, 0.03, 0.03, 0.01, 0.01]
              XF=[1, 1, 1, 1, 1, 1, 1, 1, 1, 1, 1, 1]
          WaterBalance SoilWater: SummerDate=1-Sep; SummerU=6; SummerCona=3.5; WinterDate=1-Jun; WinterU=4; WinterCona=3.5; DiffusConst=88; DiffusSlope=35.4; Salb=0.13; CN2Bare=80; CNRed=20; CNCov=0.8; PSIDul=-100; SWCON=[1, 0.8, 0.6, 0.4, 0.4, 0.4, 0.4, 0.4, 0.4, 0.4, 0.4, 0.4]
            Thickness=[300, 300, 300, 300, 300, 300, 300, 300, 300, 300, 300, 200]
          Organic: FOMCNRatio=40; CarbonUnits=Total
            Thickness  Carbon  SoilCNRatio  FBiom  FInert  FOM
            300        0.33    12           0.035  0.3     237.302
            300        0.21    12           0.02   0.3     183.495
            300        0.16    12           0.02   0.4     141.889
            300        0.11    12           0.02   0.6     109.717
            300        0.1     12           0.01   0.9     84.839
            300        0.1     12           0.01   0.95    65.603
            300        0.1     12           0.01   0.95    50.728
            300        0.1     12           0.01   0.95    39.226
            300        0.1     12           0.01   0.95    30.332
            300        0.1     12           0.01   0.95    23.454
            300        0.1     12           0.01   0.95    18.136
            200        0.05    12           0.01   1       15.279
          CERESSoilTemperature Temperature
          Chemical: PH=[6.185, 6.28, 6.445, 6.356, -, -, -, -, -, -, -, -]; PHUnits=Water
            Thickness=[300, 300, 300, 300, 300, 300, 300, 300, 300, 300, 300, 200]
            PH source: Measured (layer 1, 2, 3, 4)
          Nutrient
          Solute NO3: Thickness=[1800]; InitialValues=[3]; InitialValuesUnits=ppm; WaterTableConcentration=0; D0=0; DepthConstant=0; MaxDepthSoluteAccessible=0; RunoffEffectivenessAtMovingSolute=0; MaxEffectiveRunoff=0
          Solute NH4: Thickness=[1800]; InitialValues=[1]; InitialValuesUnits=ppm; WaterTableConcentration=0; D0=0; DepthConstant=0; MaxDepthSoluteAccessible=0; RunoffEffectivenessAtMovingSolute=0; MaxEffectiveRunoff=0
          Solute Urea: Thickness=[1800]; InitialValues=[0]; InitialValuesUnits=ppm; WaterTableConcentration=0; D0=0; DepthConstant=0; MaxDepthSoluteAccessible=0; RunoffEffectivenessAtMovingSolute=0; MaxEffectiveRunoff=0
        SurfaceOrganicMatter: InitialResidueName=nativepasture; InitialResidueType=nativepasture; InitialResidueMass=3833; InitialStandingFraction=0.3; InitialCPR=0; InitialCNR=34
        Plant Soybean
        MicroClimate: a_interception=0; b_interception=1; c_interception=0; d_interception=0; SoilHeatFluxFraction=0.4; MinimumHeightDiffForNewLayer=0; NightInterceptionFraction=0.5; ReferenceHeight=2
        Manager SowingRule
          StartDate = 7-jan
          EndDate = 7-jan
          MinESW = -
          MinRain = -
          RainDays = 0
          CultivarName = Davis
          SowingDepth = 40
          RowSpacing = 500
          Population = 38
```csharp
using Models.Interfaces;
using System;
using Models.Core;
using Models.PMF;
using Models.Soils;
using Models.Soils.Nutrients;
using Models.Utilities;
using APSIM.Shared.Utilities;
using Models.Climate;

namespace Models
{
    [Serializable]
    public class Script : Model
    {
        [Link] private Clock Clock;
        [Link] private Fertiliser Fertiliser;
        [Link] private Summary Summary;
        [Link] private Plant Soybean;
        [Link] private Soil Soil;
        private Accumulator accumulatedRain;
        [Link]
        private ISoilWater waterBalance;
        
        [Description("Start of sowing window (d-mmm)")]
        public string StartDate { get; set; }
        [Description("End of sowing window (d-mmm)")]
        public string EndDate { get; set; }
        [Description("Minimum extractable soil water for sowing (mm)")]
        public double MinESW { get; set; }
        [Description("Accumulated rainfall required for sowing (mm)")]
        public double MinRain { get; set; }
        [Description("Duration of rainfall accumulation (d)")]
        public int RainDays { get; set; }
        [Description("Cultivar to be sown")]
        [Display(Type=DisplayType.CultivarName, PlantName = "Soybean")]
        public string CultivarName { get; set; }
        [Description("Sowing depth (mm)")]
        public double SowingDepth { get; set; }
        [Description("Row spacing (mm)")]
        public double RowSpacing { get; set; }
        [Description("Plant population (/m2)")]
        public double Population { get; set; }
        
        
        [EventSubscribe("StartOfSimulation")]
        private void OnSimulationCommencing(object sender, EventArgs e)
        {
            accumulatedRain = new Accumulator(this, "[Weather].Rain", RainDays);
        }
        

        [EventSubscribe("DoManagement")]
        private void OnDoManagement(object sender, EventArgs e)
        {
            accumulatedRain.Update();
            
            if (DateUtilities.WithinDates(StartDate, Clock.Today, EndDate) &&
                !Soybean.IsAlive &&
                MathUtilities.Sum(waterBalance.ESW) > MinESW &&
                accumulatedRain.Sum > MinRain)
            {
                Soybean.Sow(population: Population, cultivar: CultivarName, depth: SowingDepth, rowSpacing: RowSpacing);    
            }
        
        }
        
    }
}
```
        Manager Fertilise 28 Jan
          FertiliserType = UreaN
          FertiliserDates = 28-jan
          Amount = 40
          AmountType = False
```csharp
using Models.Soils;
using System;
using Models.Core;
using Models.PMF;
using APSIM.Shared.Utilities;
namespace Models
{
    [Serializable]
    public class Script : Model
    {
        [Link] Clock Clock;
        [Link] Fertiliser Fertiliser;
        
        [Separator("A component to apply fertiliser on one or more dates on every year of the simulation")]

        [Description("Type of fertiliser to apply? ")] 
        public Fertiliser.Types FertiliserType { get; set; }

        [Description("Enter the fertilisation dates as dd-mmm with comma separation (any year information entered will be ignored): ")] 
        public string[] FertiliserDates { get; set; } 

        [Description("Amount of fertiliser to be applied (kg /ha)")] 
        public double Amount { get; set; }

        [Description("Is the above amount to be applied each time? (yes/ticked)? Or is it the total annual amount across all dates (no/unticked)")] 
        public bool AmountType { get; set; }
        
        [EventSubscribe("DoManagement")]
        private void OnDoManagement(object sender, EventArgs e)
        {
            foreach (string ddMMM in FertiliserDates)
            {
                if (DateUtilities.DatesEqual(ddMMM, Clock.Today))
                {
                    if (AmountType)
                        Fertiliser.Apply(Amount: Amount, Type: FertiliserType);
                    else
                        Fertiliser.Apply(Amount: Amount / FertiliserDates.Length, Type: FertiliserType);
                }
            }
        }
    }
}
```
        Manager Fertilise 16 Feb
          FertiliserType = UreaN
          FertiliserDates = 16-feb
          Amount = 40
          AmountType = False
          script: same as in DDRF.Simulation.paddock.Fertilise 28 Jan
        Manager Harvesting
```csharp
using Models.PMF.Phen;
using APSIM.Shared.Utilities;
using System.Xml.Serialization;
using Models;
using Models.PMF;
using Models.Soils;
using System.Text;
using System.Collections.Generic;
using Models.Core;
using System;
using Models.Soils.Nutrients;

namespace Models
{
    [Serializable] 
    public class Script : Model
    {
        [Link] private Plant Soybean;
        [Link] private Zone zone;
        [Link(Type = LinkType.Path, Path = "[Soybean].Phenology")]
        private Phenology phenology;
                    
        
        [EventSubscribe("StartOfSimulation")]
        private void OnSimulationCommencing(object sender, EventArgs e)
        {
        }
        
        [EventSubscribe("DoManagement")]
        private void OnDoManagement(object sender, EventArgs e)
        {
            if (phenology.CurrentPhase.Name == "ReadyForHarvesting")
            {
                Soybean.Harvest();
                Soybean.EndCrop();
            }
        }
        
        [EventSubscribe("DoManagementCalculations")]
        private void OnDoManagementCalculations(object sender, EventArgs e)
        {
            
        }
    }
}
```
  DataStore
    ExcelInput: FileNames=[DDRFRS2021Obs.xlsx]
    PredictedObserved: AllColumns=false
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