Simulations: Version=156
  DataStore
  Simulation
    Weather: FileName=%root%\Examples\WeatherFiles\Ingham.met
    Clock: Start=1990-01-01; End=2000-12-31
    Summary summaryfile
    MicroClimate: a_interception=0; b_interception=1; c_interception=0; d_interception=0; SoilHeatFluxFraction=0.4; MinimumHeightDiffForNewLayer=0; NightInterceptionFraction=0.5; ReferenceHeight=2
    Zone Field: Area=1; Slope=0; AspectAngle=0; Altitude=50
      Fertiliser
      Sugarcane: maxt_lb=0
      Folder Manager folder
        Manager SUGAR management
          planting_day = 1-apr
          plantlen = 450
          plant_stalks = 10
          variety = q117
          sowing_depth = 150
          NoRatoons = 4
          ratoonlen = 390
          ratoon_stalks = 10
```csharp
using Models.Soils;
using System;
using Models.Core;
using Models.PMF;
using APSIM.Shared.Utilities;

namespace Models
{
    [Serializable]
    [System.Xml.Serialization.XmlInclude(typeof(Model))]
    public class Script : Model
    {
        [Link] Clock Clock;
        [Link] Sugarcane Sugarcane;
        
        [Description("Enter planting date (dd-mmm)")]
        public string planting_day { get; set; }
        [Description("Duration of a plant crop (days) (30days/mth x 15mths)")]
        public int    plantlen { get; set; }
        [Description("Stalk density of plant crop (/m2)")]
        public double plant_stalks { get; set; }
        [Description("Planting variety")]
        [Display(Type=DisplayType.CultivarName, PlantName = "Sugarcane")]
        public string variety { get; set; }
        [Description("Planting depth (mm)")]
        public double sowing_depth { get; set; }
        [Description("Number of ratoons before EndCrop")]  
        public int    NoRatoons { get; set; }
        [Description("Duration of a ratoon crop (days) (30days/mth x 13mths)")]
        public int    ratoonlen { get; set; }
        [Description("Stalk density of ratoon crop (/m2)")]
        public double ratoon_stalks { get; set; }
        

        private int dah;
        //Remove this later, I don't think they use it. Days After Harvest.
        
        //two below are used for rotations. Remove this. I don't think ApsimX does rotations like this.
        private int nextcrop;
        private int fallowin;

        
        [EventSubscribe("StartOfSimulation")]
        private void OnStartOfSimulation(object sender, EventArgs e)
        {
            //Rotation variables. Not sure if these are still needed in ApsimX rotations
            nextcrop = 0;
            fallowin = 0;
        }


        [EventSubscribe("StartOfDay")]
        private void OnStartOfDay(object sender, EventArgs e)
        {

            //! Initialise and set a time counter for entire run
            dah = 0;


            if (Sugarcane.crop_status == "alive")
            {
                dah = 0;

                //! Set harvest dates for each crop phase
                if (((Sugarcane.DaysAfterSowing == plantlen) && (Sugarcane.ratoon_no == 0))
                    || ((Sugarcane.DaysAfterSowing == ratoonlen) && (Sugarcane.ratoon_no > 0)))
                {
                    
                    Sugarcane.HarvestCrop();
                    if (Sugarcane.ratoon_no == NoRatoons + 1)
                    {
                        //! plough the crop out
                        Sugarcane.KillCrop();
                        Sugarcane.EndCrop();
                    }
                    else
                    {
                        //! Set stalk density
                        Sugarcane.plants = ratoon_stalks;
                    }
                }
                else
                {
                    //! We have not reached the harvest date for this ratoon.
                }
            }
            else if (Sugarcane.crop_status == "dead")
            {
                Sugarcane.HarvestCrop();
                Sugarcane.EndCrop();
            }
            else if ((Sugarcane.crop_status == "out") && (DateUtilities.DatesEqual(planting_day, Clock.Today)))
            {
                Sugarcane.SowNewPlant(PlantingDensity: 10, Depth: sowing_depth, CultivarName: variety);
                Sugarcane.plants = plant_stalks;
                dah = 0;
            }
            else
            {
                dah = dah + 1;
            }
     
        }
    }
}
```
        Manager Fertilise on fixed date
          fert_date = 1-Sep
          fert_criteria = 1000
          fert_amount = 200
          fert_type = hard coded
```csharp
using Models.Soils.Nutrients;
using Models.Interfaces;
using APSIM.Shared.Utilities;
using Models.Soils;
using Models.Soils.Nutrients;
using Models.PMF;
using Models.Core;
using System;

namespace Models
{
    [Serializable]
    [System.Xml.Serialization.XmlInclude(typeof(Model))]
    public class Script : Model
    {
        [Link] private Clock Clock;
        [Link] private Soil Soil;
        [Link] private Fertiliser Fertiliser;
        [Link] private Summary Summary;
        private double N_topsoil;
        [Link(ByName = true)]
        private ISolute NO3;
        [Link(ByName = true)]
        private ISolute NH4;

        
        [Description("Fertilise on this date (dd-mmm)")]
        public string fert_date { get; set; }
        
        [Description("Don't add fertiliser if N in top 2 layers exceeds (kg/ha)")]
        public double fert_criteria { get; set; }
        
        [Description("Amount to apply (kg/ha)")]
        public double fert_amount { get; set; }
        
        [Description("Type of fertilser to apply")]
        public string fert_type { get; set; }
    


        /*
         if (today = date('[fert_date]') then
            N_topsoil = no3(1) + nh4(1) + no3(2) + nh4(2)
            if (N_topsoil < [fert_criteria]) then
               [fertmodule] apply amount = [fert_amount] (kg/ha), depth = 50 (mm), type = [fert_type] ()
            endif
         endif 
        */
        
        
        [EventSubscribe("StartOfDay")]
        private void OnStartOfDay(object sender, EventArgs e)
        {

            if (DateUtilities.DatesEqual(fert_date, Clock.Today))
            {
                N_topsoil = NO3.kgha[1] + NH4.kgha[1] + NO3.kgha[2] + NH4.kgha[2];                    
                if (N_topsoil < fert_criteria)
                {
                    Fertiliser.Apply(Amount: fert_amount, Depth: 50, Type: Fertiliser.Types.UreaN);
                }
            }

        }
      
    }
}
```
      Report: EventNames=[Clock].DoReport
        VariableNames:
          [Clock].Today
          [Sugarcane].crop_status
          [Sugarcane].biomass
          [Sugarcane].cane_wt
          [Sugarcane].sucrose_wt
          [Sugarcane].height
          [Sugarcane].root_depth
          [Sugarcane].node_no_detached
          [Sugarcane].leaves
          [Sugarcane].green_leaves
          [Sugarcane].dead_leaves
          [Sugarcane].lai
          [Sugarcane].tla
          [Sugarcane].plant_n_tot
          [Sugarcane].swdef_photo
          [Sugarcane].swdef_pheno
          [Sugarcane].swdef_expan
          [Sugarcane].swdef_stalk
          [Sugarcane].nfact_photo
          [Sugarcane].nfact_expan
          [Sugarcane].oxdef_photo
          [Sugarcane].ep
      SurfaceOrganicMatter Surface Organic Matter: InitialResidueName=sugar_trash; InitialResidueType=Sugarcane; InitialResidueMass=1000; InitialStandingFraction=1; InitialCPR=0; InitialCNR=80
      Soil: SoilType=Black Vertosol; Site=Jimbour; NearestTown=Jimbour, Q 4352; Region=South East Queensland; NaturalVegetation=Grassland, mainly Qld bluegrass; Latitude=0; Longitude=0
        Water: Thickness=[150, 150, 300, 300, 300, 300, 300, 300, 300, 300, 300]; RelativeTo=LL15; FilledFromTop=true
          InitialValues=[0.54, 0.53, 0.54, 0.54, 0.458, 0.31, 0.32, 0.33, 0.34, 0.35, 0.36]
        Physical
          Thickness  BD    AirDry  LL15  DUL   SAT
          150        1.02  0.14    0.29  0.54  0.59
          150        1.03  0.26    0.29  0.53  0.58
          300        1.02  0.29    0.29  0.54  0.59
          300        1.02  0.29    0.29  0.54  0.58
          300        1.06  0.3     0.3   0.52  0.57
          300        1.11  0.31    0.31  0.5   0.55
          300        1.12  0.32    0.32  0.5   0.55
          300        1.15  0.33    0.33  0.48  0.53
          300        1.18  0.34    0.34  0.47  0.52
          300        1.2   0.35    0.35  0.46  0.51
          300        1.25  0.36    0.36  0.44  0.49
          SoilCrop BarleySoil
            LL=[0.29, 0.29, 0.32, 0.38, 0.39, 0.39, 0.41, 0.48, 0.47, 0.46, 0.44]
            KL=[0.1, 0.1, 0.08, 0.06, 0.04, 0.02, 0.01, 0, 0, 0, 0]
            XF=[1, 1, 1, 1, 1, 1, 1, 0, 0, 0, 0]
          SoilCrop ChickpeaSoil
            LL=[0.29, 0.29, 0.36, 0.43, 0.51, 0.5, 0.5, 0.48, 0.47, 0.46, 0.44]
            KL=[0.1, 0.1, 0.08, 0.06, 0.04, 0.02, 0.01, 0, 0, 0, 0]
            XF=[1, 1, 1, 1, 1, 1, 1, 0, 0, 0, 0]
          SoilCrop LucerneSoil
            LL=[0.29, 0.29, 0.29, 0.29, 0.3, 0.31, 0.32, 0.33, 0.34, 0.35, 0.36]
            KL=[0.1, 0.1, 0.1, 0.1, 0.09, 0.09, 0.09, 0.09, 0.09, 0.09, 0.09]
            XF=[1, 1, 1, 1, 1, 1, 1, 1, 1, 1, 1]
          SoilCrop MaizeSoil
            LL=[0.29, 0.29, 0.34, 0.34, 0.37, 0.4, 0.42, 0.48, 0.47, 0.46, 0.44]
            KL=[0.1, 0.1, 0.1, 0.08, 0.06, 0.04, 0.02, 0, 0, 0, 0]
            XF=[1, 1, 1, 1, 1, 1, 1, 0, 0, 0, 0]
          SoilCrop Perennial GrassSoil
            LL=[0.29, 0.29, 0.39, 0.41, 0.4, 0.4, 0.41, 0.41, 0.4, 0.4, 0.42]
            KL=[0.1, 0.1, 0.1, 0.1, 0.09, 0.07, 0.05, 0, 0, 0, 0]
            XF=[1, 1, 1, 1, 1, 1, 1, 0, 0, 0, 0]
          SoilCrop SorghumSoil
            LL=[0.29, 0.29, 0.35, 0.38, 0.4, 0.4, 0.4, 0.48, 0.47, 0.46, 0.44]
            KL=[0.1, 0.1, 0.1, 0.08, 0.06, 0.04, 0.02, 0, 0, 0, 0]
            XF=[1, 1, 1, 1, 1, 1, 1, 0, 0, 0, 0]
          SoilCrop WheatSoil
            LL=[0.29, 0.29, 0.32, 0.32, 0.35, 0.38, 0.41, 0.48, 0.47, 0.46, 0.44]
            KL=[0.1, 0.1, 0.08, 0.06, 0.04, 0.02, 0.01, 0, 0, 0, 0]
            XF=[1, 1, 1, 1, 1, 1, 1, 0, 0, 0, 0]
          SoilCrop SugarcaneSoil
            LL=[0.29, 0.29, 0.32, 0.32, 0.35, 0.38, 0.41, 0.48, 0.47, 0.46, 0.44]
            KL=[0.1, 0.1, 0.08, 0.06, 0.04, 0.02, 0.01, 0, 0, 0, 0]
            XF=[1, 1, 1, 1, 1, 1, 1, 0, 0, 0, 0]
        WaterBalance SoilWater: SummerDate=1-Nov; SummerU=6; SummerCona=3.5; WinterDate=1-Apr; WinterU=6; WinterCona=3.5; DiffusConst=40; DiffusSlope=16; Salb=0.13; CN2Bare=73; CNRed=20; CNCov=0.8; DischargeWidth=5; CatchmentArea=10; PSIDul=-100; Thickness=[150, 150, 300, 300, 300, 300, 300, 300, 300, 300, 300]; SWCON=[0.3, 0.3, 0.3, 0.3, 0.3, 0.3, 0.3, 0.3, 0.3, 0.3, 0.3]
        CERESSoilTemperature Temperature
        Solute NO3: Thickness=[150, 150, 300, 300, 300, 300, 300, 300, 300, 300, 300]; InitialValues=[6.5, 2.1, 2.1, 1.7, 1.7, 1.7, 1.7, 1.7, 1.7, 1.7, 1.7]; InitialValuesUnits=ppm; WaterTableConcentration=0; D0=0; DepthConstant=0; MaxDepthSoluteAccessible=0; RunoffEffectivenessAtMovingSolute=0; MaxEffectiveRunoff=0
        Solute NH4: Thickness=[150, 150, 300, 300, 300, 300, 300, 300, 300, 300, 300]; InitialValues=[0.6, 0.1, 0.1, 0.1, 0.1, 0.1, 0.1, 0.1, 0.1, 0.1, 0.1]; InitialValuesUnits=ppm; WaterTableConcentration=0; D0=0; DepthConstant=0; MaxDepthSoluteAccessible=0; RunoffEffectivenessAtMovingSolute=0; MaxEffectiveRunoff=0
        Solute UREA: Thickness=[150, 150, 300, 300, 300, 300, 300, 300, 300, 300, 300]; InitialValues=[0, 0, 0, 0, 0, 0, 0, 0, 0, 0, 0]; InitialValuesUnits=kg/ha; WaterTableConcentration=0; D0=0; DepthConstant=0; MaxDepthSoluteAccessible=0; RunoffEffectivenessAtMovingSolute=0; MaxEffectiveRunoff=0
        Organic: FOMCNRatio=40; CarbonUnits=Total
          Thickness  Carbon  SoilCNRatio  FBiom  FInert  FOM
          150        1.04    12.5         0.025  0.4     48.129
          150        0.89    12.5         0.02   0.6     41.425
          300        0.89    12.5         0.015  0.8     30.688
          300        0.89    12.5         0.01   0.9     22.734
          300        0.77    12.5         0.01   0.95    16.842
          300        0.45    12.5         0.01   0.95    12.477
          300        0.27    12.5         0.01   0.95    9.243
          300        0.22    12.5         0.01   0.95    6.847
          300        0.16    12.5         0.01   0.95    5.073
          300        0.13    12.5         0.01   0.95    3.758
          300        0.12    12.5         0.01   0.95    2.784
        Chemical: PHUnits=Water
          Thickness  PH   EC
          150        8.4  0.2
          150        8.8  0.25
          300        9    0.31
          300        9.2  0.4
          300        9.2  0.59
          300        9.1  0.84
          300        9    0.93
          300        9    1.01
          300        8.9  1.06
          300        8.9  1.05
          300        8.9  1.01
        Nutrient
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