Simulations: Version=156
  Simulation Continuous Maize
    Weather: FileName=\Examples\MetFiles\Goond.met
    Clock: Start=1985-06-01; End=1989-05-01
    Summary summaryfile
    Zone paddock: Area=1; Slope=0; AspectAngle=0; Altitude=50
      Soil: Latitude=0; Longitude=0
        Water: Thickness=[100, 100, 100, 200, 200, 200, 200, 200, 200, 200]; InitialValues=[0.11, 0.14, 0.16, 0.17, 0.19, 0.2, 0.2, 0.2, 0.2, 0.2]; RelativeTo=LL15; FilledFromTop=true
        Physical
          Thickness  BD    AirDry  LL15  DUL   SAT
          100        1.35  0.04    0.11  0.22  0.3
          100        1.35  0.14    0.14  0.25  0.3
          100        1.35  0.15    0.16  0.27  0.32
          200        1.4   0.16    0.17  0.28  0.33
          200        1.4   0.18    0.19  0.3   0.34
          200        1.4   0.18    0.2   0.3   0.35
          200        1.4   0.18    0.2   0.31  0.36
          200        1.4   0.18    0.2   0.32  0.37
          200        1.4   0.18    0.2   0.31  0.37
          200        1.4   0.18    0.2   0.31  0.37
          SoilCrop SorgSoil
            LL=[0.11, 0.14, 0.16, 0.17, 0.19, 0.2, 0.2, 0.2, 0.2, 0.2]
            KL=[0.07, 0.07, 0.07, 0.07, 0.07, 0.07, 0.04, 0.04, 0.04, 0.04]
            XF=[1, 1, 1, 1, 1, 1, 1, 1, 1, 1]
          SoilCrop CowpeaSoil
            LL=[0.11, 0.14, 0.16, 0.17, 0.19, 0.2, 0.2, 0.2, 0.2, 0.2]
            KL=[0.08, 0.08, 0.08, 0.08, 0.06, 0.04, 0.03, 0.02, 0.01, 0.01]
            XF=[1, 1, 1, 1, 1, 1, 1, 1, 1, 1]
          SoilCrop MaizeSoil
            LL=[0.11, 0.14, 0.16, 0.17, 0.19, 0.2, 0.2, 0.2, 0.2, 0.2]
            KL=[0.08, 0.08, 0.08, 0.08, 0.06, 0.04, 0.03, 0.02, 0.01, 0.01]
            XF=[1, 1, 1, 1, 1, 1, 1, 1, 1, 1]
          SoilCrop MucunaSoil
            LL=[0.11, 0.14, 0.16, 0.17, 0.19, 0.2, 0.2, 0.2, 0.2, 0.2]
            KL=[0.08, 0.08, 0.08, 0.08, 0.06, 0.04, 0.03, 0.02, 0.01, 0.01]
            XF=[1, 1, 1, 1, 1, 1, 1, 1, 1, 1]
          SoilCrop PeanutSoil
            LL=[0.11, 0.14, 0.16, 0.17, 0.19, 0.2, 0.2, 0.2, 0.2, 0.2]
            KL=[0.08, 0.08, 0.08, 0.08, 0.06, 0.04, 0.03, 0.02, 0.01, 0.01]
            XF=[1, 1, 1, 1, 1, 1, 1, 1, 1, 1]
          SoilCrop PigeonpSoil
            LL=[0.11, 0.14, 0.16, 0.17, 0.19, 0.2, 0.2, 0.2, 0.2, 0.2]
            KL=[0.08, 0.08, 0.08, 0.08, 0.06, 0.04, 0.03, 0.02, 0.01, 0.01]
            XF=[1, 1, 1, 1, 1, 1, 1, 1, 1, 1]
          SoilCrop SoybeanSoil
            LL=[0.11, 0.14, 0.16, 0.17, 0.19, 0.2, 0.2, 0.2, 0.2, 0.2]
            KL=[0.08, 0.08, 0.08, 0.08, 0.06, 0.04, 0.03, 0.02, 0.01, 0.01]
            XF=[1, 1, 1, 1, 1, 1, 1, 1, 1, 1]
        WaterBalance SoilWater: SummerDate=1-Nov; SummerU=9; SummerCona=2.5; WinterDate=1-Apr; WinterU=9; WinterCona=2.5; DiffusConst=88; DiffusSlope=35.4; Salb=0.13; CN2Bare=75; CNRed=20; CNCov=0.8; DischargeWidth=5; CatchmentArea=10; PSIDul=-100; Thickness=[100, 100, 100, 200, 200, 200, 200, 200, 200, 200]; SWCON=[0.5, 0.5, 0.5, 0.5, 0.5, 0.5, 0.5, 0.5, 0.5, 0.5]
        CERESSoilTemperature Temperature
        Solute NO3: Thickness=[100, 100, 100, 200, 200, 200, 200, 200, 200, 200]; InitialValuesUnits=ppm; WaterTableConcentration=0; D0=0; DepthConstant=0; MaxDepthSoluteAccessible=0; RunoffEffectivenessAtMovingSolute=0; MaxEffectiveRunoff=0
          InitialValues=[0.237, 0.712, 0.712, 0.554, 0.395, 0.395, 0.237, 0.237, 0.158, 0.079]
        Solute NH4: Thickness=[100, 100, 100, 200, 200, 200, 200, 200, 200, 200]; InitialValuesUnits=ppm; WaterTableConcentration=0; D0=0; DepthConstant=0; MaxDepthSoluteAccessible=0; RunoffEffectivenessAtMovingSolute=0; MaxEffectiveRunoff=0
          InitialValues=[0.194, 0.484, 0.29, 0.29, 0.29, 0.29, 0.29, 0.29, 0.29, 0.29]
        Solute UREA: Thickness=[100, 100, 100, 200, 200, 200, 200, 200, 200, 200]; InitialValues=[0, 0, 0, 0, 0, 0, 0, 0, 0, 0]; InitialValuesUnits=kg/ha; WaterTableConcentration=0; D0=0; DepthConstant=0; MaxDepthSoluteAccessible=0; RunoffEffectivenessAtMovingSolute=0; MaxEffectiveRunoff=0
        Organic: FOMCNRatio=45; CarbonUnits=Total
          Thickness  Carbon  SoilCNRatio  FBiom  FInert  FOM
          100        1.2     14.5         0.02   0.6     246.271
          100        1       14.5         0.01   0.65    206.43
          100        0.86    14.5         0.01   0.7     173.034
          200        0.83    14.5         0.01   0.75    121.577
          200        0.58    14.5         0.01   0.8     85.422
          200        0.54    14.5         0.01   0.85    60.019
          200        0.47    14.5         0.01   0.93    42.171
          200        0.5     14.5         0.01   0.93    29.63
          200        0.5     14.5         0.01   0.93    20.819
          200        0.5     14.5         0.01   0.93    14.627
        Chemical: Thickness=[100, 100, 100, 200, 200, 200, 200, 200, 200, 200]; PH=[6, 6, 6, 6.2, 6.5, 6.7, 6.8, 6.8, 6.8, 6.8]; PHUnits=Water
        Nutrient
      SurfaceOrganicMatter: InitialResidueName=wheat; InitialResidueType=wheat; InitialResidueMass=0; InitialStandingFraction=0; InitialCPR=0; InitialCNR=80
      Fertiliser
      Plant maize: ResourceName=Maize
      Folder Manager folder
        Manager Sow using a variable rule with intercropping
          crop = maize
          cultivar1 = sc401
          cropmethod = sole
          rotation_exclude = False
          date1 = 1-nov
          date2 = 30-dec
          must_sow = False
          rain_amount = 20
          rain_days = 5
          esw_amount = 30
          sow_opp = 1
          surface_up = 2
          surface_low = 0
          density = 2.2
          depth = 100
          row_spacing = 0.9
          ftn = 1
          skiprow = solid
          fert_amount_sow = 0
          fert_type_sow = urea_N
          fert_days_TopDress = 35
          fert_amount_TopDress = 27
          fert_type_TopDress = NH4NO3
          surfaceommodule_pre_sow = SurfaceOrganicMatter
          manure_days_pre_sow = 30
          manure_amount_pre_sow = 0
          manure_type_pre_sow = manure
          manure_cnr_pre_sow = 25
          manure_cpr_pre_sow = 50
          fert_days_pre_sow = 25
          fert_amount_pre_sow = 50
          fert_criteria_pre_sow = 1000
          totn_pre_sow = 0
          fert_type_pre_sow = urea_N
          surfaceommodule = SurfaceOrganicMatter
          soilmodule = Soil
          planter_type = user_defined
          planter_depth = 150
          thin_fraction = 1
          planter_f_incorp = 1
          planter_cn_red = 0
          planter_cn_rain = 0
          till_days_pre_sow = 0
          must_till = False
          tillage_type = disc
          tillage_depth = 100
          tillage_f_incorp = 1
          fraction = 0
          tillage_cn_red = 0
          tillage_cn_rain = 0
```csharp
using Models.Soils;
using System;
using Models.Core;
using Models.PMF;
namespace Models
{
    [Serializable]
    [System.Xml.Serialization.XmlInclude(typeof(Model))]
    public class Script : Model
    {
        [Link] Clock Clock;

        [Description("Name of this crop")]
        public string crop { get; set; }

        [Description("Enter cultivar : ")]
        [Display(Type = DisplayType.CultivarName)]
        public string cultivar1 { get; set; }

        [Description("Method of cropping")]
        public cropmethodType cropmethod { get; set; }

        [Description("Exclude from rotation sequence")]
        public bool rotation_exclude { get; set; }

        [Description("Enter sowing window START date (dd-mmm)")]
        public string date1 { get; set; }

        [Description("Enter sowing window END date (dd-mmm)")]
        public string date2 { get; set; }

        [Description("Must Sow")]
        public bool must_sow { get; set; }

        [Description("Enter amount of cumulative rainfall (mm)")]
        public string rain_amount { get; set; }

        [Description("Enter number of days to accumulate rainfall (days)")]
        public string rain_days { get; set; }

        [Description("Enter amount of soil water (mm)")]
        public string esw_amount { get; set; }

        [Description("Enter sowing opportunity number to sow on (1..n)")]
        public string sow_opp { get; set; }

        [Description("Enter upper limit of sw in top layer (0-2) (mm esw/mm soil)")]
        public string surface_up { get; set; }

        [Description("Enter lower limit of sw in top layer (0-1) (mm esw/mm soil)")]
        public string surface_low { get; set; }

        [Description("Enter sowing density  (plants/m2)")]
        public string density { get; set; }

        [Description("Enter sowing depth  (mm)")]
        public string depth { get; set; }

        [Description("Enter row spacing  (mm) (m for maize and sorghum)")]
        public string row_spacing { get; set; }

        [Description("Enter Fertile Tiller No. : ")]
        public string ftn { get; set; }

        [Description("Skip row : ")]
        public skiprowType skiprow { get; set; }

        [Description("Amount of starter fertiliser at sowing (kg/ha)")]
        public string fert_amount_sow { get; set; }

        [Description("Type")]
        public fert_type_sowType fert_type_sow { get; set; }

        [Description("Enter number of days after sowing to apply top-dress fertiliser (days)")]
        public string fert_days_TopDress { get; set; }

        [Description("Amount of TopDress fertiliser (kg/ha)")]
        public string fert_amount_TopDress { get; set; }

        [Description("Type")]
        public fert_type_TopDressType fert_type_TopDress { get; set; }

        [Description("Module used to apply the manure : ")]
        public string surfaceommodule_pre_sow { get; set; }

        [Description("Enter number of days before window to apply pre-crop manure (days)")]
        public string manure_days_pre_sow { get; set; }

        [Description("Amount of manure to apply (kg/ha) : ")]
        public string manure_amount_pre_sow { get; set; }

        [Description("manure type : ")]
        public manure_type_pre_sowType manure_type_pre_sow { get; set; }

        [Description("manure CNR : ")]
        public string manure_cnr_pre_sow { get; set; }

        [Description("manure CPR : ")]
        public string manure_cpr_pre_sow { get; set; }

        [Description("Enter number of days before window to apply pre-crop fertiliser (days)")]
        public string fert_days_pre_sow { get; set; }

        [Description("Amount of pre-crop fertiliser (kg/ha)")]
        public string fert_amount_pre_sow { get; set; }

        [Description("Don't add fertiliser if pre-crop N in top 2 layers exceeds (kg/ha)")]
        public string fert_criteria_pre_sow { get; set; }

        [Description(" OR  Amount of pre-crop N required in top 3 layers (kg/ha)")]
        public string totn_pre_sow { get; set; }

        [Description("Type (NO3_N, NH4_N, NH4NO3, UAN_N, urea_N, urea_no3, urea)")]
        public string fert_type_pre_sow { get; set; }

        [Description("Name of your surface organic matter module : ")]
        public string surfaceommodule { get; set; }

        [Description("Name of your soil module : ")]
        public string soilmodule { get; set; }

        [Description("Planter type")]
        public planter_typeType planter_type { get; set; }

        [Description("User_defined depth of seedbed preparation (mm)")]
        public string planter_depth { get; set; }

        [Description("Enter fraction of weed population killed (0-1)")]
        public string thin_fraction { get; set; }

        [Description("User_defined fraction of surface residues to incorporate (0-1)")]
        public string planter_f_incorp { get; set; }

        [Description("cn reduction after tillage () : ")]
        public string planter_cn_red { get; set; }

        [Description("amount of cummulative rain to dissipate tillage effects on cn () : ")]
        public string planter_cn_rain { get; set; }

        [Description("Enter number of days before window to prepare seed-bed (days)")]
        public string till_days_pre_sow { get; set; }

        [Description("Must Till (yes/no)")]
        public bool must_till { get; set; }

        [Description("Tillage type (user_defined, chisel, disc, planter)")]
        public tillage_typeType tillage_type { get; set; }

        [Description("User_defined depth of seedbed preparation (mm)")]
        public string tillage_depth { get; set; }

        [Description("User_defined fraction of surface residues to incorporate (0-1)")]
        public string tillage_f_incorp { get; set; }

        [Description("Enter biomass removal fraction of growing weeds from field (0-1)")]
        public string fraction { get; set; }

        [Description("cn reduction after tillage () : ")]
        public string tillage_cn_red { get; set; }

        [Description("amount of cummulative rain to dissipate tillage effects on cn () : ")]
        public string tillage_cn_rain { get; set; }
        public enum cropmethodType 
        {
            sole,intercrop
        }
        public enum skiprowType 
        {
            solid, single, _double /*replaces double*/
        }
        public enum fert_type_sowType 
        {
            NO3_N, NH4_N, NH4NO3, UAN_N, urea_N, urea_no3, urea
        }
        public enum fert_type_TopDressType 
        {
            NO3_N, NH4_N, NH4NO3, UAN_N, urea_N, urea_no3, urea
        }
        public enum manure_type_pre_sowType 
        {
            manure,fym,heap_uncov,heap_cov,pit,communal
        }
        public enum planter_typeType 
        {
            user_defined, planter
        }
        public enum tillage_typeType 
        {
            user_defined,chisel,disc,planter,burn,burn_90,graze,scarifier,rip,blade,tine
        }

        [EventSubscribe("StartOfSimulation")]
        private void OnSimulationCommencing(object sender, EventArgs e)
        {
            /*
                
         next = 1
         crop_in = 0
         blank = 'fallow'
         next_crop = blank
         crop_current = blank
         crop_current1 = blank
         crop_current2 = blank
         crop_sow = blank
         ready_for_next = 1
         ready_to_manure_pre_sow = 0
         days_last_year = 365
         manure_day_pre_sow = 0
         ready_to_till_pre_sow = 0
         till_day_pre_sow = 0
         days_after_weed_kill = 0
         ready_to_fert_pre_sow = 0
         wht_sow_opp_num = 0
         wht_sow_opp_days = 0
         days_this_year = 0
        
            */
        }
        [EventSubscribe("DoCalculations")]
        private void OnDoCalculations(object sender, EventArgs e)
        {
            /*
                

         if (date_within('[date1], [date2]') = 1) THEN
         else
            wht_sow_opp_num = 0
            wht_sow_opp_days = 0
         endif
         
            */
        }
        //[EventSubscribe("unknown")]
        //private void OnUnknown(object sender, EventArgs e)
        //{
            /*
                // ----- process ----- 


         days_this_year = 364 + (date('1-mar') - date('28-feb'))
         if (next_crop = '[crop]' OR next_crop = blank OR '[rotation_exclude]' = 'yes') then
               !  Presowing  manure application

            if ([manure_amount_pre_sow] > 0) then
               !  calculate day to fertilise
               manure_day_pre_sow = date('[date1]') - [manure_days_pre_sow]
               ! Need to correct for possible year boundary condition
               if (manure_day_pre_sow < today) then
                  manure_day_pre_sow = days_this_year + manure_day_pre_sow
               endif
               if (today = manure_day_pre_sow) then
                  ready_to_manure_pre_sow = 1
               endif
               if (crop_in = 0 and ready_to_manure_pre_sow = 1) then
                        ! just put on a fixed amount of manure
                  '[surfaceommodule_pre_sow]' add_surfaceom type=[manure_type_pre_sow], name=[manure_type_pre_sow], mass=[manure_amount_pre_sow], cnr=[manure_cnr_pre_sow], cpr=[manure_cpr_pre_sow]
                  ready_to_manure_pre_sow = 0
                  manure_day_pre_sow = 0
               endif
            endif

               !  Presowing  fertiliser application

            if ([fert_amount_pre_sow] > 0 OR [totn_pre_sow] > 0 ) then
               !  calculate day to fertilise
               fert_day_pre_sow = date('[date1]') - [fert_days_pre_sow]
               ! Need to correct for possible year boundary condition
               if (fert_day_pre_sow < today) then
                  fert_day_pre_sow = days_this_year + fert_day_pre_sow
               endif
               if (today = fert_day_pre_sow) then
                  ready_to_fert_pre_sow = 1
               endif
               if (crop_in = 0 and ready_to_fert_pre_sow = 1) then
                  if ([totn_pre_sow] > 0) then
                     !   Top up soil N of top 3 layers
                     N_deficit = [totn_pre_sow] - (no3(1) + nh4(1) + no3(2) + nh4(2) + no3(3) + nh4(3))
                     if (N_deficit < 0) then
                        ! do nothing
                        N_deficit = 0
                     else
                        fertiliser apply amount = N_deficit (kg/ha), depth = 50 (mm), type = [fert_type_pre_sow] ()
                     endif
                  else
                     N_topsoil = no3(1) + nh4(1) + no3(2) + nh4(2)
                     if (N_topsoil > [fert_criteria_pre_sow]) then
                        ! enough N already in topsoil
                     else
                        ! just put on a fixed amount of N
                        fertiliser apply amount = [fert_amount_pre_sow] (kg/ha), depth = 50 (mm), type = [fert_type_pre_sow] ()
                     endif
                  endif
                  ready_to_fert_pre_sow = 0
                  fert_day_pre_sow = 0
               endif
            endif

            !   Tillage - presowing seedbed preparation
            if ( [till_days_pre_sow] > 0) then
               ! calculate presowing tillage date
               till_day_pre_sow = date('[date1]') - [till_days_pre_sow]
               ! Need to correct for possible year boundary condition
               if (till_day_pre_sow < today) then
                  till_day_pre_sow = days_this_year + till_day_pre_sow
               endif
               if (today = till_day_pre_sow) then
                  ready_to_till_pre_sow = 1
               endif
               if ((crop_in = 0 OR '[must_till]' = 'yes') AND (ready_to_till_pre_sow = 1)) then
                  ! tillage
                if (crop_current = 'weed' or crop_current1 = 'weed' or crop_current2 = 'weed') then
                  if (weed.plant_status <> 'out') then
                        weed harvest  remove=[fraction]
                        weed kill_crop
                        weed end_crop
                        days_after_weed_kill = 0
                       crop_in = crop_in - 1
                       if (crop_current = 'weed') then
                           crop_current = crop_current1
                           crop_current1 = crop_current2
                           crop_current2 = blank
                        elseif (crop_current1 = 'weed') then
                           crop_current1 = crop_current2
                           crop_current2 = blank
                        elseif (crop_current2 = 'weed') then
                           crop_current2 = blank
                        endif
                  endif
                 endif
                  if ('[tillage_type]' = 'user_defined') then
                      '[surfaceommodule]' tillage type = [tillage_type], f_incorp = [tillage_f_incorp] (), tillage_depth = [tillage_depth]
                      '[soilmodule] Water' tillage type = [tillage_type], cn_red = [tillage_cn_red], cn_rain = [tillage_cn_rain]
                  else
                      '[surfaceommodule]' tillage type = [tillage_type] ()
                      '[soilmodule] Water' tillage type = [planter_type]
                  endif
                  ready_to_till_pre_sow = 0
                  till_day_pre_sow = 0
               endif
            endif

            if (today = date('[date2]')) then
               if ('[rotation_exclude]' = 'no') then
                  ready_for_next = 1
               endif
            endif

            if (wht_sow_opp_num > 0) then
               wht_sow_opp_days = wht_sow_opp_days + 1
            else
            endif

         if (crop_in = 0 OR ('[cropmethod]' = 'intercrop'
             AND [crop].plant_status = 'out')) then
               if (date_within('[date1], [date2]') = 1) then
                  crop_sow = 'waiting'
                  surface_moist = (sw(1) - ll15(1)) / (dul(1)- ll15(1))
                  if ((rain[[rain_days]] >= [rain_amount]  AND  esw >= [esw_amount] AND
                        (surface_moist <= [surface_up] and surface_moist >= [surface_low])) OR
                      ('[must_sow]' = 'yes' AND today = date('[date2]'))) THEN


                     if (wht_sow_opp_days >= [rain_days] OR wht_sow_opp_num = 0) then
                        wht_sow_opp_num = wht_sow_opp_num + 1
                        wht_sow_opp_days = 0
                     endif

                     if ((wht_sow_opp_num >= [sow_opp]) OR ('[must_sow]' = 'yes' AND today = date('[date2]')) then
                        if ('[crop]' = 'sorghum') then
                           [crop] sow plants =[density], sowing_depth = [depth], cultivar = [cultivar1], row_spacing = [row_spacing], tiller_no_fertile = [ftn] (), skip = [skiprow]
                        else
                          [crop] sow cultivar = [cultivar1], plants = [density] (plants/m2), sowing_depth = [depth], row_spacing = [row_spacing]
                        endif
                        crop_in = crop_in + 1
                        if ('[rotation_exclude]' = 'no') then
                           ready_for_next = 1
                        endif
                        crop_current2 = crop_current1
                        crop_current1 = crop_current
                        crop_current = '[crop]'
                        crop_sow = '[crop]'
                        ready_to_manure_pre_sow = 0
                        if ([fert_amount_sow] > 0) then
                           fertiliser apply amount = [fert_amount_sow] (kg/ha), depth = 50 (mm), type = [fert_type_sow] ()
                        endif
                        !   Planter -
                        ! Planting
                        if (crop_current = 'weed' or crop_current1 = 'weed' or crop_current2 = 'weed') then
                           if (weed.plant_status <> 'out' AND [thin_fraction] > 0) then
                              weed kill_crop plants_kill_fraction = [thin_fraction]
                              if ([thin_fraction] = 1.0) then
                                 weed end_crop
                                 days_after_weed_kill = 0
                              else
                              endif
                              if ([thin_fraction] = 1.0) then
                                    crop_in = crop_in - 1
                                   if (crop_current = 'weed') then
                                       crop_current = crop_current1
                                       crop_current1 = crop_current2
                                       crop_current2 = blank
                                    elseif (crop_current1 = 'weed') then
                                       crop_current1 = crop_current2
                                       crop_current2 = blank
                                    elseif (crop_current2 = 'weed') then
                                       crop_current2 = blank
                                    endif
                              endif
                           endif
                        endif
                        if ('[planter_type]' = 'user_defined') then
                            '[surfaceommodule]' tillage type = [planter_type], f_incorp = [planter_f_incorp] (), tillage_depth = [planter_depth]
                            '[soilmodule] Water' tillage type = [planter_type], cn_red = [planter_cn_red], cn_rain = [planter_cn_rain]
                        else
                            '[surfaceommodule]' tillage type = [planter_type] ()
                            '[soilmodule] Water' tillage type = [planter_type]
                        endif


                     else
                        !not this opportunity
                     endif
                  endif
               endif
            endif
         endif
         ! apply topdress fertiliser
         if ([fert_amount_TopDress] > 0.0) then
            if ([crop].DaysAfterSowing = [fert_days_TopDress]) then
               fertiliser apply amount = [fert_amount_TopDress] (kg/ha), depth = 50 (mm), type = [fert_type_TopDress] ()
            else
            endif
         else
         endif
         
            */
        //}
    }
}
```
        Manager Output at harvesting for intercropping
          crop = maize
          outputfile = outputfile
```csharp
using Models.Soils;
using System;
using Models.Core;
using Models.PMF;
namespace Models
{
    [Serializable]
    [System.Xml.Serialization.XmlInclude(typeof(Model))]
    public class Script : Model
    {
        [Link] Clock Clock;

        [Description("Enter name of crop to output at harvest : ")]
        public string crop { get; set; }

        [Description("Name of outputfile component : ")]
        public string outputfile { get; set; }

        [EventSubscribe("DoCalculations")]
        private void OnDoCalculations(object sender, EventArgs e)
        {
            /*
                
         if ([crop]_to_harvest = 1) then
            '[outputfile]' do_output
         endif
            
            */
        }
    }
}
```
        Manager Harvesting rule for intercropping
          crop = maize
          fraction_to_remove = 0.0
```csharp
using Models.Soils;
using System;
using Models.Core;
using Models.PMF;
namespace Models
{
    [Serializable]
    [System.Xml.Serialization.XmlInclude(typeof(Model))]
    public class Script : Model
    {
        [Link] Clock Clock;

        [Description("Enter name of crop to harvest when ripe : ")]
        public string crop { get; set; }

        [Description("Enter fraction of stover to remove: ")]
        public string fraction_to_remove { get; set; }

        [EventSubscribe("StartOfSimulation")]
        private void OnSimulationCommencing(object sender, EventArgs e)
        {
            /*
                
          [crop]_to_harvest = 0
            
            */
        }
        [EventSubscribe("DoCalculations")]
        private void OnDoCalculations(object sender, EventArgs e)
        {
            /*
                
         if ([crop]_to_harvest = 1) then
            [crop] harvest remove=[fraction_to_remove]
            [crop] kill_crop
            [crop] end_crop
                  crop_in = crop_in - 1
            [crop]_to_harvest = 0
            fert_tot = 0
            sow_year = 0
            if (crop_current = '[crop]') then
               crop_current = crop_current1
               crop_current1 = crop_current2
               crop_current2 = blank
            elseif (crop_current1 = '[crop]') then
               crop_current1 = crop_current2
               crop_current2 = blank
            elseif (crop_current2 = '[crop]') then
               crop_current2 = blank
            endif
         endif

         if ([crop].StageName = 'harvest_ripe' OR [crop].plant_status = 'dead') then
            [crop]_to_harvest = 1
         endif
            
            */
        }
    }
}
```
        Manager Remove all residues on a fixed date
          date = 1-may
          surfaceommodule = SurfaceOrganicMatter
```csharp
using Models.Soils;
using System;
using Models.Core;
using Models.PMF;
namespace Models
{
    [Serializable]
    [System.Xml.Serialization.XmlInclude(typeof(Model))]
    public class Script : Model
    {
        [Link] Clock Clock;

        [Description("Date to remove residues (dd-mmm) :")]
        public string date { get; set; }

        [Description("Name of your surface organic matter module : ")]
        public string surfaceommodule { get; set; }

        [EventSubscribe("DoManagement")]
        private void OnDoManagement(object sender, EventArgs e)
        {
            /*
                
         if today = date('[date]') then
            '[surfaceommodule]' tillage type = user_defined, f_incorp = 1.0 (), tillage_depth = 0.0 ()
         endif
            
            */
        }
    }
}
```
      Report
        VariableNames:
          [Clock].Today
          esw
          day
          year
          yield
          stover
          biomass
      MicroClimate: a_interception=0; b_interception=1; c_interception=0; d_interception=0; SoilHeatFluxFraction=0; MinimumHeightDiffForNewLayer=0; NightInterceptionFraction=0; ReferenceHeight=2
    SoilArbitrator
  DataStore
